// SBML level 2 version 1

model Xu2003_Phosphoinositide_turnover()
  // Xu2003 - Phosphoinositide turnover
  // The model reproduces the percentage change of PIP_PM, PIP2_PM and IP3_Cyt as depicted in Figure 1 of the paper. The model also contains the equations for the analysis of PH-GFP experiments, however the initial value of PH_GFP has been set to zero to more accurately reproduce Figure 1. The units of cytosolic species are given in molecules/um^3. In order to convert them to uM, divide the concentration by 602. For the analysis of PH_GFP experiments, one should plug in the values of PH_GFP, IP3_PHGFP and PIP2_PHGFP from Table AI in the appendix. The model was successfully tested on MathSBML.
  // This model has been generated by VCell
  // This model is described in the article:
  // Kinetic analysis of receptor-activated phosphoinositide turnover.
  // Xu C, Watras J, Loew LM.
  // J. Cell Biol. 2003 May; 161(4): 779-791
  // Abstract:
  // We studied the bradykinin-induced changes in phosphoinositide composition of N1E-115 neuroblastoma cells using a combination of biochemistry, microscope imaging, and mathematical modeling. Phosphatidylinositol-4,5-bisphosphate (PIP2) decreased over the first 30 s, and then recovered over the following 2-3 min. However, the rate and amount of inositol-1,4,5-trisphosphate (InsP3) production were much greater than the rate or amount of PIP2 decline. A mathematical model of phosphoinositide turnover based on this data predicted that PIP2 synthesis is also stimulated by bradykinin, causing an early transient increase in its concentration. This was subsequently confirmed experimentally. Then, we used single-cell microscopy to further examine phosphoinositide turnover by following the translocation of the pleckstrin homology domain of PLCdelta1 fused to green fluorescent protein (PH-GFP). The observed time course could be simulated by incorporating binding of PIP2 and InsP3 to PH-GFP into the model that had been used to analyze the biochemistry. Furthermore, this analysis could help to resolve a controversy over whether the translocation of PH-GFP from membrane to cytosol is due to a decrease in PIP2 on the membrane or an increase in InsP3 in cytosol; by computationally clamping the concentrations of each of these compounds, the model shows how both contribute to the dynamics of probe translocation.
  // This model is hosted on BioModels Database and identified by: BIOMD0000000075 .
  // To cite BioModels Database, please use: BioModels Database: An enhanced, curated and annotated resource for published quantitative kinetic models .
  // To the extent possible under law, all copyright and related or neighbouring rights to this encoded model have been dedicated to the public domain worldwide. Please refer to CC0 Public Domain Dedication for more information.
  // biomodels.db:MODEL3095606944
  // biomodels.db:BIOMD0000000075
  // isDescribedBy pubmed:12771127
  // isDerivedFrom pubmed:10579714 pubmed:10866945
  // occursIn BTO:0000931
  // isVersionOf GO:0046488

  // Compartments:
  compartment Extracellular = 0.2777778;  // GO:0005576
  compartment PM in Extracellular = 0.5555556 um2;  // 2-D; GO:0005886
  compartment Cytosol in PM = 1;  // GO:0005622
  compartment NM in Cytosol = 0.1111111 um2;  // 2-D; GO:0031965
  compartment Nucleus in NM = 0.1111111;  // GO:0005634

  // Species:
  species PIP2_PHGFP_PM in PM = 0;  // substance in molecules; hasPart CHEBI:18348 interpro:IPR001849 interpro:IPR011584
  species PH_GFP_Cyt in Cytosol = 0;  // substance in molecules; hasPart interpro:IPR011584 interpro:IPR001849
  species PI_PM in PM = 142857;  // substance in molecules; isVersionOf CHEBI:28874
  species $stim_PM in PM = 1;  // substance in molecules; hasProperty opb:OPB_01072+
  species IP3_PHGFP_Cyt in Cytosol = 0;  // substance in molecules; hasPart CHEBI:16595 interpro:IPR001849 interpro:IPR011584
  species PIP2_PM in PM = 4000;  // substance in molecules; isVersionOf CHEBI:18348
  species PIP_PM in PM = 2857;  // substance in molecules; isVersionOf CHEBI:26034
  species DAG_PM in PM = 2000;  // substance in molecules; isVersionOf CHEBI:18035
  species $hv_Cytosol in Cytosol = 0;  // substance in molecules; isVersionOf CHEBI:30212
  species $IP3X_Cytosol in Cytosol = 0;  // substance in molecules; PATO:0002355; isVersionOf CHEBI:16595
  species PLC_PM in PM = 100;  // substance in molecules; isVersionOf uniprot:Q8K4S1
  species PLC_act_PM in PM = 0;  // substance in molecules; isVersionOf uniprot:Q8K4S1; hasProperty ec-code:3.1.4.11
  species IP3_Cyt in Cytosol = 96.32;  // substance in molecules; isVersionOf CHEBI:16595

  // Parameters:
  KMOLE = 0.00166113 uM_um3_molecules_1;
  PIP_basal_PIPSyn = 2857 molecules_um_2;
  kBasalSynPIP_PIPSyn = 0.0055 s_1;
  kStimSynPIP_PIPSyn = 0.019 s_1;
  tauPIPsyn_PIPSyn = 0.05 s;
  PIPsyndecay_PIPSyn = 1 s;
  Ratebasal_PIPsyn_PIPSyn has s_1;
  Ratestim_PIPsyn_PIPSyn has s_1;
  tau0_PLCact = 0.05 second;
  stimdecay_PLCact = 1 second;
  signal_PLCact has dimensionless;
  kf_PIP2PH_PIP2_PH = 0.12 uM_1_s_1;
  KdPIP2PH_PIP2_PH = 2 uM;
  kr_PIP2PH_PIP2_PH has s_1;
  kStimSynPIP2_PIP2Syn = 0.92 s_1;
  tauPIP2syn_PIP2Syn = 0.05 s;
  PIP2syndecay_PIP2Syn = 1 s;
  PIP2_basal_PIP2Syn = 4000 molecules_um_2;
  kBasalSynPIP2_PIP2Syn = 0.048 s_1;
  Rate_PIP2Synbasal_PIP2Syn has s_1;
  Rate_PIP2SynStim_PIP2Syn has s_1;
  kf_IP3PH_IP3_PHGFP = 10 uM_1_s_1;
  KdIP3PH_IP3_PHGFP = 2 uM;
  kr_IP3PH_IP3_PHGFP has s_1;

  // Assignment rules:
  Ratebasal_PIPsyn_PIPSyn := piecewise(0.581*kBasalSynPIP_PIPSyn*(-1 + exp((PIP_basal_PIPSyn + (-PIP_PM))*(1/PIP_basal_PIPSyn))), PIP_PM < PIP_basal_PIPSyn, 0);
  Ratestim_PIPsyn_PIPSyn := piecewise(kStimSynPIP_PIPSyn*exp(-((time + (-tauPIPsyn_PIPSyn))*(1/PIPsyndecay_PIPSyn))), time > tauPIPsyn_PIPSyn, 0);
  signal_PLCact := piecewise(exp(-((time + (-tau0_PLCact))*(1/stimdecay_PLCact))), time > tau0_PLCact, 0);
  kr_PIP2PH_PIP2_PH := kf_PIP2PH_PIP2_PH*KdPIP2PH_PIP2_PH;
  Rate_PIP2Synbasal_PIP2Syn := piecewise(0.581*kBasalSynPIP2_PIP2Syn*(-1 + exp((PIP2_basal_PIP2Syn + (-PIP2_PM))*(1/PIP2_basal_PIP2Syn))), PIP2_PM < PIP2_basal_PIP2Syn, 0);
  Rate_PIP2SynStim_PIP2Syn := piecewise(kStimSynPIP2_PIP2Syn*exp(-((time + (-tauPIP2syn_PIP2Syn))*(1/PIP2syndecay_PIP2Syn))), time > tauPIP2syn_PIP2Syn, 0);
  kr_IP3PH_IP3_PHGFP := kf_IP3PH_IP3_PHGFP*KdIP3PH_IP3_PHGFP;

  // Reactions:
  PIPSyn: PI_PM -> PIP_PM; (Ratebasal_PIPsyn_PIPSyn + Ratestim_PIPsyn_PIPSyn)*PI_PM*PM;
    PIPSyn_I = 0 pA_um_2;
  PIP2_hyd: PIP2_PM -> DAG_PM + IP3_Cyt; k_PIP2hyd*PIP2_PM*PLC_act_PM*PM;  // modifiers: PLC_act_PM
    PIP2_hyd_I = 0 pA_um_2; k_PIP2hyd = 2.4 um2_molecules_1_s_1;
  PLCact: PLC_PM -> PLC_act_PM; (KfPLCact*PLC_PM*stim_PM*signal_PLCact + (-(krPLCact*PLC_act_PM)))*PM;  // modifiers: stim_PM
    PLCact_I = 0 pA_um_2; KfPLCact = 0.0005 um2_molecules_1_s_1; krPLCact = 0.1 s_1;
  PIP2_PH_hyd: PIP2_PHGFP_PM -> PH_GFP_Cyt + IP3_Cyt + DAG_PM; k_PIP2PHhyd*PLC_act_PM*PIP2_PHGFP_PM*PM;  // modifiers: PLC_act_PM
    PIP2_PH_hyd_I = 0 pA_um_2; k_PIP2PHhyd = 0 um2_molecules_1_s_1;
  PIP2_PH: PH_GFP_Cyt + PIP2_PM -> PIP2_PHGFP_PM; (kf_PIP2PH_PIP2_PH*0.00166113*PH_GFP_Cyt*PIP2_PM + (-(kr_PIP2PH_PIP2_PH*PIP2_PHGFP_PM)))*PM;
    PIP2_PH_I = 0 pA_um_2;
  IP3deg: IP3_Cyt -> ; kIP3deg*(0.00166113*IP3_Cyt + (-IP3_basal))*Cytosol*1*(1/KMOLE);
    kIP3deg = 0.08 s_1; IP3_basal = 0.16 uM;
  PIP2Syn: PIP_PM -> PIP2_PM; (Rate_PIP2Synbasal_PIP2Syn + Rate_PIP2SynStim_PIP2Syn)*PIP_PM*PM;
    PIP2Syn_I = 0 pA_um_2;
  IP3_PHGFP: IP3_Cyt + PH_GFP_Cyt -> IP3_PHGFP_Cyt; (kf_IP3PH_IP3_PHGFP*0.00166113*IP3_Cyt*0.00166113*PH_GFP_Cyt + (-(kr_IP3PH_IP3_PHGFP*0.00166113*IP3_PHGFP_Cyt)))*Cytosol*1*(1/KMOLE); IP3_PHGFP is "IP3-PHGFP";

  // Unit definitions:
  unit substance = item;
  unit volume = (1e-6 metre)^3;
  unit area = (1e-6 metre)^2;
  unit molecules = item;
  unit umol_um3_litre_1 = 1e-21 mole;
  unit um2 = (1e-6 metre)^2;
  unit uM_um3_molecules_1 = 1e-21 dimensionless * mole / item;
  unit molecules_um_2_s_1 = item / ((1e-6 metre)^2 * second);
  unit pA_um_2 = dimensionless * ampere / metre^2;
  unit s_1 = 1 / second;
  unit molecules_um_2 = item / (1e-6 metre)^2;
  unit s = second;
  unit um2_molecules_1_s_1 = (1e-6 metre)^2 / (item * second);
  unit uM_s_1 = 1e-6 mole / (litre * second);
  unit uM_1_s_1 = litre / (1e-6 mole * second);
  unit uM = 1e-6 mole / litre;
end
