// SBML level 2 version 4

model Mears1997_CRAC_PancreaticBetaCells()
  // This a model from the article:
  // Evidence that calcium release-activated current mediates the biphasic electrical activity of mouse pancreatic beta-cells.
  // Mears D, Sheppard NF Jr, Atwater I, Rojas E, Bertram R, Sherman A. J Membr Biol1997 Jan 1;155(1):47-59 9002424,
  // Abstract:
  // The electrical response of pancreatic beta-cells to step increases in glucose concentration is biphasic, consisting of a prolonged depolarization with action potentials (Phase 1) followed by membrane potential oscillations known as bursts. We have proposed that the Phase 1 response results from the combined depolarizing influences of potassium channel closure and an inward, nonselective cation current (ICRAN) that activates as intracellular calcium stores empty during exposure to basal glucose (Bertram et al., 1995). The stores refill during Phase 1, deactivating ICRAN and allowing steady-state bursting to commence. We support this hypothesis with additional simulations and experimental results indicating that Phase 1 duration is sensitive to the filling state of intracellular calcium stores. First, the duration of the Phase 1 transient increases with duration of prior exposure to basal (2.8 mM) glucose, reflecting the increased time required to fill calcium stores that have been emptying for longer periods. Second, Phase 1 duration is reduced when islets are exposed to elevated K+ to refill calcium stores in the presence of basal glucose. Third, when extracellular calcium is removed during the basal glucose exposure to reduce calcium influx into the stores, Phase 1 duration increases. Finally, no Phase 1 is observed following hyperpolarization of the beta-cell membrane with diazoxide in the continued presence of 11 mm glucose, a condition in which intracellular calcium stores remain full. Application of carbachol to empty calcium stores during basal glucose exposure did not increase Phase 1 duration as the model predicts. Despite this discrepancy, the good agreement between most of the experimental results and the model predictions provides evidence that a calcium release-activated current mediates the Phase 1 electrical response of the pancreatic beta-cell.
  // This model was taken from the CellML repository and automatically converted to SBML.
  // The original model was: Mears D, Sheppard NF Jr, Atwater I, Rojas E, Bertram R, Sherman A. (1997) - version=1.0
  // The original CellML model was created by:
  // Tessa Paris
  // tpar054@aucklanduni.ac.uk
  // The University of Auckland
  // This model originates from BioModels Database: A Database of Annotated Published Models (http://www.ebi.ac.uk/biomodels/). It is copyright (c) 2005-2011 The BioModels.net Team.
  // For more information see the terms of use.
  // To cite BioModels Database, please use: Li C, Donizelli M, Rodriguez N, Dharuri H, Endler L, Chelliah V, Li L, He E, Henry A, Stefan MI, Snoep JL, Hucka M, Le Novère N, Laibe C (2010) BioModels Database: An enhanced, curated and annotated resource for published quantitative kinetic models. BMC Syst Biol., 4:92.
  // biomodels.db:MODEL1006230074
  // biomodels.db:BIOMD0000000375
  // isDescribedBy pubmed:9002424
  // isDerivedFrom biomodels.db:BIOMD0000000374
  // occursIn BTO:0000783
  // isVersionOf GO:0061469 GO:0044342 GO:0015278

  // Compartments:
  compartment COMpartment = 1;

  // Species:
  species V_membrane in COMpartment = -61/COMpartment;  // PATO:0001462
  species n in COMpartment = 0.0005/COMpartment;  // GO:0005251
  species jm in COMpartment = 0.12/COMpartment;
  species Ca_er_Ca_equations in COMpartment = 60/COMpartment;  // CHEBI:29108
  species Ca_i in COMpartment = 0.11/COMpartment;  // CHEBI:29108

  // Parameters:
  Cm = 6158;
  V_K = -70;
  g_K = 3900;
  Vn = -15;
  Sn = 6;
  lambda_n = 1.85;
  V_Ca = 100;
  g_Ca_f = 810;
  Vm_f = -20;
  Sm_f = 7.5;
  g_Ca_s = 510;
  Vm_s = -16;
  Sm_s = 10;
  Vj = -53;
  Sj = 2;
  g_K_Ca = 1200;
  kdkca = 0.55;
  g_CRAC = 75;
  V_CRAC = 0;
  Ca_er_bar = 40;
  sloper = 3;
  g_leak = 0;
  IP3 = 0;
  kerp = 0.09;
  verp = 0.24;
  dact = 0.35;
  dinh = 0.4;
  dip3 = 0.2;
  perl = 0.003;
  lambda_er = 250;
  sigma_er = 1;
  kmp = 0.35;
  vmp = 0.08;
  gamma = 3.607e-6;
  f = 0.01;

  // Assignment rules:
  tau_n := 9.09/(1 + exp((V_membrane + 15)/6));
  i_K := g_K*n*(V_membrane - V_K);
  n_infinity := 1/(1 + exp((-15 - V_membrane)/6));
  g_K_ATP := piecewise(2000, (time > 60000) && (time < 660000), 150);
  i_K_ATP := g_K_ATP*(V_membrane - V_K);
  m_f_infinity := 1/(1 + exp((-20 - V_membrane)/7.5));
  i_Ca_f := g_Ca_f*m_f_infinity*(V_membrane - V_Ca);
  m_s_infinity := 1/(1 + exp((-16 - V_membrane)/10));
  i_Ca_s := g_Ca_s*m_s_infinity*(1 - jm)*(V_membrane - V_Ca);
  jm_infinity := 1 - 1/(1 + exp((V_membrane + 53)/2));
  tau_j := 50000/(exp((V_membrane + 53)/4) + exp((-53 - V_membrane)/4)) + 1500;
  i_Ca := i_Ca_f + i_Ca_s;
  i_K_Ca := g_K_Ca*Ca_i^5/(Ca_i^5 + kdkca^5)*(V_membrane - V_K);
  r_infinity := 1/(1 + exp((Ca_er_Ca_equations - Ca_er_bar)/sloper));
  i_CRAC := g_CRAC*r_infinity*(V_membrane - V_CRAC);
  i_leak := g_leak*(V_membrane - V_CRAC);
  J_er_p := verp*Ca_i^2/(Ca_i^2 + kerp^2);
  a_infinity := 1/(1 + dact/Ca_i);
  b_infinity := IP3/(IP3 + dip3);
  h_infinity := 1/(1 + Ca_i/dinh);
  O := a_infinity^3*b_infinity^3*h_infinity^3*1;
  J_er_IP3 := O*(Ca_er_Ca_equations - Ca_i);
  J_er_leak := perl*(Ca_er_Ca_equations - Ca_i);
  J_er_tot := J_er_leak + J_er_IP3 - J_er_p;
  Jmp := vmp*Ca_i^2/(Ca_i^2 + kmp^2);
  J_mem_tot := -f*(gamma*i_Ca + Jmp);

  // Rate rules:
  V_membrane' = -(i_Ca + i_K + i_K_ATP + i_K_Ca + i_CRAC + i_leak)/Cm;
  n' = lambda_n*(n_infinity - n)/tau_n;
  jm' = (jm_infinity - jm)/tau_j;
  Ca_er_Ca_equations' = -J_er_tot/(lambda_er*sigma_er);
  Ca_i' = J_er_tot/lambda_er + J_mem_tot;
end
