// SBML level 3 version 1

function KL_123(Km, A, B, k_cat)
  NaN;
end

model SABIOmdl20Jul2016749()
  // This model has been created with the help of the SABIO-RK Database (http://sabio.h-its.org/) (c) 2005-2016 HITS gGmbH http://www.h-its.org
  // To cite SABIO-RK Database, please use "http://www.ncbi.nlm.nih.gov/pubmed/22102587"
  // SABIO-RK - database for biochemical reaction kinetics. Wittig U, Kania R, Golebiewski M, Rey M, Shi L, Jong L, Algaa E, Weidemann A, Sauer-Danzwith H, Mir S, Krebs O, Bittkowski M, Wetsch E, Rojas I, Mueller W. Nucleic Acids Res. 2012;40(Database issue)790-6

  // Compartments:
  compartment compart_Cell;

  // Species:
  species SPC_1262_Cell in compart_Cell = 1; SPC_1262_Cell is "NADPH";  // CHEBI:16474 kegg.compound:C00005
  species SPC_39_Cell in compart_Cell = 1; SPC_39_Cell is "H+";  // CHEBI:15378 kegg.compound:C00080
  species SPC_1336_Cell in compart_Cell = 1; SPC_1336_Cell is "Dihydrofolate";  // CHEBI:15633 kegg.compound:C00415
  species SPC_1263_Cell in compart_Cell = 1; SPC_1263_Cell is "NADP+";  // CHEBI:18009 CHEBI:25523 CHEBI:44409 kegg.compound:C00006
  species SPC_1297_Cell in compart_Cell = 1; SPC_1297_Cell is "5,6,7,8-Tetrahydrofolate";  // CHEBI:15635 CHEBI:20506 CHEBI:26911 kegg.compound:C00101
  species ENZ_139470_Cell in compart_Cell = 1; ENZ_139470_Cell is "dihydrofolate reductase(Enzyme) mutant DHFR N59K";  // uniprot:P0ABQ4

  // Reactions:
  REAC_0: SPC_1262_Cell + SPC_39_Cell + SPC_1336_Cell -> SPC_1263_Cell + SPC_1297_Cell; KL_123(REAC_0_Km_SPC_1336_Cell, SPC_1262_Cell, SPC_1336_Cell, REAC_0_k_cat);  // modifiers: ENZ_139470_Cell; isVersionOf ec-code:1.5.1.3; kegg.reaction:R00939; hasTaxon taxonomy:562; sabiork.reaction:100
    REAC_0_Km_SPC_1336_Cell = 1.36e-5 M; REAC_0_k_cat = 4.3 swedgeone;

  // Unit definitions:
  unit M = mole / litre;
  unit swedgeone = 1 / second; swedgeone is "s^(-1)";
end
