// SBML level 3 version 2
// Created with https://github.com/matthiaskoenig/sbmlutils.

model glimepiride_kidney(BSA, egfr, crcl, Vext, Vki, Vurine, m1_ext, m1_urine, m2_ext, m2_urine)
  // Model for renal M1 and M2 excretion.
  // Glimepiride is fully metabolized in the liver, and no unchanged drug is excreted [FDA label].
  // ~60 % of the total radioactivity is excreted in urine (M1: predominant), and ~40% is excreted in feces (M2: predominant) [FDA label].
  // version 1
  // Changelog
  // version 1
  // initial model for glimepiride
  // The content of this model has been carefully created in a manual research effort.
  // Terms of use
  // Copyright © 2025 Matthias König.
  // This work is licensed under a Creative Commons Attribution 4.0 International License.
  // Redistribution and use of any part of this model, with or without modification, are permitted provided that the following conditions are met:
  // Redistributions of this SBML file must retain the above copyright notice, this list of conditions and the following disclaimer.
  // Redistributions in a different form must reproduce the above copyright notice, this list of conditions and the following disclaimer in the documentation and/or other materials provided with the distribution.
  // This model is distributed in the hope that it will be useful, but WITHOUT ANY WARRANTY; without even the implied warranty of MERCHANTABILITY or FITNESS FOR A PARTICULAR PURPOSE.
  // occursIn FMA:7203 BTO:0000671 ncit:C12415
  // hasProperty ncit:C79372 mamo:MAMO_0000046 ncit:C29073 ncit:C97936 ncit:C15299 ncit:C2985
  // biomodels.db:MODEL2510140001
  // hasTaxon taxonomy:9606 snomedct:337915000
  // isDescribedBy doi:10.3389/fphar.2025.1686415 doi:10.5281/physiome.28379193 doi:10.5281/zenodo.14628700
  // model units - substance: mmole, time: min, volume: litre, area: m2, length: metre, extent: mmole

  // Compartments:
  compartment Vext = 1.5 litre; Vext is "plasma";  // SBO:0000290 ncit:C13356 BTO:0000131
  compartment Vki = 0.3 litre; Vki is "kidney";  // SBO:0000290 FMA:7203 BTO:0000671 ncit:C12415
  compartment Vurine = 1 litre;  // SBO:0000290 FMA:12274 ncit:C13283 BTO:0001419

  // Species:
  species m1_ext in Vext = 0; m1_ext is "M1 (plasma)";  // SBO:0000247 CHEBI:180533 pubchem.compound:130939 inchikey:YUNQMQLWOOVHKI-UHFFFAOYSA-N
  substanceOnly species m1_urine in Vurine = 0; m1_urine is "M1 (urine)";  // SBO:0000247 CHEBI:180533 pubchem.compound:130939 inchikey:YUNQMQLWOOVHKI-UHFFFAOYSA-N
  species m2_ext in Vext = 0; m2_ext is "M2 (plasma)";  // SBO:0000247 pubchem.compound:10075365 inchikey:MMZLACCSCMGVHL-UHFFFAOYSA-N
  substanceOnly species m2_urine in Vurine = 0; m2_urine is "M2 (urine)";  // SBO:0000247 pubchem.compound:10075365 inchikey:MMZLACCSCMGVHL-UHFFFAOYSA-N

  // Parameters:
  BSA = 1.73 m2; BSA is "body surface area [m^2]";  // SBO:0000002
  // scaling factor for renal function. 1.0: normal renal function; <1.0: reduced renal function
  f_renal_function = 1 dimensionless; f_renal_function is "parameter for renal function";  // SBO:0000009
  // A laboratory test that estimates kidney function. It is calculated using an individual's serum creatinine measurement, age, gender, and race.
  egfr has ml_per_min_bsa; egfr is "estimated GFR [ml/min/(1.73 m^2)]";  // SBO:0000002 ncit:C110935
  // The clearance rate of creatinine, that is, the volume of plasma that is cleared of creatinine by the kidneys per unit time. Creatinine clearance is calculated using the level of creatinine in a sample of urine, usually one collected over a period of 24 hours, the corresponding plasma creatinine level, and the volume of urine excreted. It is used as an approximation of the glomerular filtration rate (GFR).
  crcl has ml_per_min; crcl is "creatinine clearance [ml/min]";  // SBO:0000002 CMO:0000765
  // eGFR is often estimated via creatinine clearance, creatinine urinary amount, or creatinine plasma amounts.
  // CKD-EPI Creatinine Equation (2021): This is the most recent and recommended equation for
  // estimating GFR35. It is more accurate than previous formulas and does not include
  // race as a variable.
  // MDRD (Modification of Diet in Renal Disease) Study Equation
  egfr_healthy = 100 ml_per_min_bsa; egfr_healthy is "estimated glomerular filtration (eGFR) rate healthy";  // SBO:0000002
  M1EX_k = 0.1480098 per_min; M1EX_k is "rate of M1 urinary excretion";  // SBO:0000009
  M2EX_k = 0.09849263 per_min; M2EX_k is "rate of M2 urinary excretion";  // SBO:0000009

  // Assignment rules:
  egfr := f_renal_function*egfr_healthy;
  // CrCl typically overestimates GFR by 10-20% due to the active secretionof creatinine in the proximal tubules.Using a 10 % overestimation in the model.
  crcl := egfr*BSA/1.73*1.1;

  // Reactions:
  M1EX: m1_ext => m1_urine; f_renal_function*Vki*M1EX_k*m1_ext; M1EX is "M1 excretion (M1EX)";  // SBO:0000655
  M2EX: m2_ext => m2_urine; f_renal_function*Vki*M2EX_k*m2_ext; M2EX is "M2 excretion (M2EX)";  // SBO:0000655

  // Unit definitions:
  unit g_per_mole = gram / mole; g_per_mole is "g/mole";
  unit l_per_min = litre / (60 second); l_per_min is "l/min";
  unit m2 = metre^2; m2 is "meter^2";
  unit mM = 1e-3 mole / litre; mM is "mmole/liter";
  unit mg = 1e-3 gram;
  unit mg_per_g = 1e-3 gram / gram; mg_per_g is "mg/g";
  unit mg_per_s_l = 1e-3 gram / (second * litre); mg_per_s_l is "mg/s/l";
  unit min = 60 second;
  unit min_per_hr = 60 second / (3600 second); min_per_hr is "min/hour";
  unit ml_per_l = 1e-3 litre / litre; ml_per_l is "ml/l";
  unit ml_per_min = 1e-3 litre / (60 second); ml_per_min is "ml/min";
  unit ml_per_min_bsa = 5.780347e-4 litre / (60 second * metre^2); ml_per_min_bsa is "ml/min/(1.73 * m^2)";
  unit mmole = 1e-3 mole;
  unit mmole_per_min = 1e-3 mole / (60 second); mmole_per_min is "mmole/min";
  unit mmole_per_min_l = 1e-3 mole / (60 second * litre); mmole_per_min_l is "mmole/min/l";
  unit per_min = 1 / (60 second); per_min is "1/min";
  unit per_mmole = 1 / (1e-3 mole); per_mmole is "1/mmole";
end
