// SBML level 3 version 2
// Created with https://github.com/matthiaskoenig/sbmlutils.

model glimepiride_liver(Vext, Vli, gli_ext, gli, m1_ext, m1, m2_ext, m2)
  // Model for hepatic glimepiride metabolism.
  // Model for hepatic glimepiride metabolism. Glimepiride is completely biotransformed by hepatic oxidative metabolism. The CYP2C9 enzyme transforms glimepiride to the cyclohexylhydroxymethyl derivative (M1), which is further metabolized to form the carboxy derivative (M2) by cytosolic enzymes. [FDA label]
  // The content of this model has been carefully created in a manual research effort.
  // Terms of use
  // Copyright © 2025 Matthias König.
  // This work is licensed under a Creative Commons Attribution 4.0 International License.
  // Redistribution and use of any part of this model, with or without modification, are permitted provided that the following conditions are met:
  // Redistributions of this SBML file must retain the above copyright notice, this list of conditions and the following disclaimer.
  // Redistributions in a different form must reproduce the above copyright notice, this list of conditions and the following disclaimer in the documentation and/or other materials provided with the distribution.
  // This model is distributed in the hope that it will be useful, but WITHOUT ANY WARRANTY; without even the implied warranty of MERCHANTABILITY or FITNESS FOR A PARTICULAR PURPOSE.
  // occursIn FMA:7197 BTO:0000759 ncit:C12392
  // hasProperty ncit:C79371 ncit:C79372 mamo:MAMO_0000046 ncit:C29073 ncit:C97936 ncit:C15299
  // biomodels.db:MODEL2510140001
  // hasTaxon taxonomy:9606 snomedct:337915000
  // isDescribedBy doi:10.3389/fphar.2025.1686415 doi:10.5281/physiome.28379193 doi:10.5281/zenodo.14628700
  // model units - substance: mmole, time: min, volume: litre, area: m2, length: metre, extent: mmole

  // Compartments:
  compartment Vext = 1.5 litre; Vext is "plasma";  // SBO:0000290 ncit:C13356 BTO:0000131
  compartment Vli = 1.5 litre; Vli is "liver";  // SBO:0000290 FMA:7197 BTO:0000759 ncit:C12392

  // Species:
  species gli_ext in Vext = 0; gli_ext is "glimepiride (plasma)";  // SBO:0000247 CHEBI:5383 ncit:C29073 snomedct:386966003
  species gli in Vli = 0; gli is "glimepiride (liver)";  // SBO:0000247 CHEBI:5383 ncit:C29073 snomedct:386966003
  species m1_ext in Vext = 0; m1_ext is "M1 (plasma)";  // SBO:0000247 CHEBI:180533 pubchem.compound:130939 inchikey:YUNQMQLWOOVHKI-UHFFFAOYSA-N
  species m1 in Vli = 0; m1 is "M1 (liver)";  // SBO:0000247 CHEBI:180533 pubchem.compound:130939 inchikey:YUNQMQLWOOVHKI-UHFFFAOYSA-N
  species m2_ext in Vext = 0; m2_ext is "M2 (plasma)";  // SBO:0000247 pubchem.compound:10075365 inchikey:MMZLACCSCMGVHL-UHFFFAOYSA-N
  species m2 in Vli = 0; m2 is "M2 (liver)";  // SBO:0000247 pubchem.compound:10075365 inchikey:MMZLACCSCMGVHL-UHFFFAOYSA-N

  // Parameters:
  GLIIM_k = 100 per_min; GLIIM_k is "rate glimepiride import";  // SBO:0000186
  GLI2M1_Vmax = 5.362036e-5 mmole_per_min_l; GLI2M1_Vmax is "rate glimepiride conversion";  // SBO:0000186
  // 0.18 +- 0.03 µM [Maekawa2009] 2.25 +- 0.80 µM [Zhang2023] 4.1 +- 0.4 µM [Suzuki2006]
  GLI2M1_Km_gli = 0.00225 mM;  // SBO:0000027
  // Scaling factor to vary CYP2C9 activity. 1.0: unchanged activity; < 1.0 decreased activity; >1.0 increased activity.
  f_cyp2c9 = 1 dimensionless; f_cyp2c9 is "scaling factor CYP2C9 activity";  // SBO:0000002
  M1EX_k = 0.07774346 per_min; M1EX_k is "rate M1 export";  // SBO:0000186
  M12M2_k = 0.01485199 per_min; M12M2_k is "rate m1 -> m2 conversion";  // SBO:0000186
  M2EX_k = 99.99817 per_min; M2EX_k is "rate M2 export";  // SBO:0000186

  // Reactions:
  GLIIM: gli_ext -> gli; GLIIM_k*Vli*(gli_ext - gli); GLIIM is "glimepiride import";  // SBO:0000655
  GLI2M1: gli => m1; f_cyp2c9*GLI2M1_Vmax*Vli*gli/(gli + GLI2M1_Km_gli); GLI2M1 is "glimepiride → M1 (CYP2C9)";  // SBO:0000176 uniprot:P11712 brenda:1.14.99.38
  M1EX: m1 -> m1_ext; M1EX_k*Vli*(m1 - m1_ext); M1EX is "M1 export";  // SBO:0000655
  M12M2: m1 => m2; M12M2_k*Vli*m1; M12M2 is "M1 → M2";  // SBO:0000176
  M2EX: m2 -> m2_ext; M2EX_k*Vli*(m2 - m2_ext); M2EX is "M2 export";  // SBO:0000655

  // Unit definitions:
  unit g_per_mole = gram / mole; g_per_mole is "g/mole";
  unit l_per_min = litre / (60 second); l_per_min is "l/min";
  unit m2 = metre^2; m2 is "meter^2";
  unit mM = 1e-3 mole / litre; mM is "mmole/liter";
  unit mg = 1e-3 gram;
  unit mg_per_s_l = 1e-3 gram / (second * litre); mg_per_s_l is "mg/s/l";
  unit min = 60 second;
  unit min_per_hr = 60 second / (3600 second); min_per_hr is "min/hour";
  unit mmole = 1e-3 mole;
  unit mmole_per_min = 1e-3 mole / (60 second); mmole_per_min is "mmole/min";
  unit mmole_per_min_l = 1e-3 mole / (60 second * litre); mmole_per_min_l is "mmole/min/l";
  unit per_min = 1 / (60 second); per_min is "1/min";
  unit per_mmole = 1 / (1e-3 mole); per_mmole is "1/mmole";
end
