// SBML level 2 version 4

function ap(ao, ai, bo, bi, ka, kb)
  (ao*bi - bo*ai)/(ka*kb*((1 + ai/ka + bi/kb)*(ao/ka + bo/kb) + (1 + ao/ka + bo/kb)*(ai/ka + bi/kb)));
end

function g(xi, xo)
  xi*xo*ln(xi/xo)/(xi - xo);
end

model whitcomb04()
  // Whitcomb2004_Bicarbonate_Pancreas
  // A mathematical model of the pancreatic duct cell generating high bicarbonate concentrations in pancreatic juice
  // David C Whitcomb, G Bard Ermentrout, Pancreas 2004 29:e30-40; PubMedID:15257112
  // Abstract:
  // OBJECTIVE: To develop a simple, physiologically based mathematical model of pancreatic duct cell secretion using experimentally derived parameters that generates pancreatic fluid bicarbonate concentrations of >140 mM after CFTR activation.
  // METHODS: A new mathematical model was developed simulating a duct cell within a proximal pancreatic duct and included a sodium-2-bicarbonate cotransporter (NBC) and sodium-potassium pump (NaK pump) on a chloride-impermeable basolateral membrane, CFTR on the luminal membrane with 0.2 to 1 bicarbonate to chloride permeability ratio. Chloride-bicarbonate antiporters (Cl/HCO3 AP) were added or subtracted from the basolateral (APb) and luminal (APl) membranes. The model was integrated over time using XPPAUT.
  // RESULTS: This model predicts robust, NaK pump-dependent bicarbonate secretion with opening of the CFTR, generates and maintains pancreatic fluid secretion with bicarbonate concentrations >140 mM, and returns to basal levels with CFTR closure. Limiting CFTR permeability to bicarbonate, as seen in some CFTR mutations, markedly inhibited pancreatic bicarbonate and fluid secretion.
  // CONCLUSIONS: A simple CFTR-dependent duct cell model can explain active, high-volume, high-concentration bicarbonate secretion in pancreatic juice that reproduces the experimental findings. This model may also provide insight into why CFTR mutations that predominantly affect bicarbonate permeability predispose to pancreatic dysfunction in humans.
  // This SBML version of the model was created directly from the XPPAUT code found in the appendix with the exception of the parameter vr, the ratio between the duct cell volume and the duct lumen, which is defined inversely to the main text in the XPPAUT code. vr was defined as the ratio of the duct cell volume to the duct lumen volume as in the main text. The model reproduces the figures found in the article. The model uses initial assignments for the lumen volume and events to trigger CFTR opening, so only tools supporting these features can be used to simulate it (eg. Copasi and SBW/Roadrunner).
  // biomodels.db:MODEL1104180000
  // biomodels.db:BIOMD0000000327
  // isDescribedBy pubmed:15257112
  // hasTaxon taxonomy:9606 BTO:0002362
  // isVersionOf GO:0030157
  // hasProperty mamo:MAMO_0000046

  // Compartments:
  compartment plasma = 1;
  compartment cell = 1;
  compartment lumen = cell/vr;

  // Species:
  species $bb in plasma = 22; bb is "HCO3-";  // CHEBI:17544
  species $cb in plasma = 130; cb is "CL-";  // CHEBI:17996
  species $nb in plasma = 140; nb is "Na+";  // CHEBI:29101
  species bi in cell = 15; bi is "HCO3-";  // CHEBI:17544
  species ci in cell = 60; ci is "CL-";  // CHEBI:17996
  species ni in cell = 14; ni is "Na+";  // CHEBI:29101
  species bl in lumen = 32; bl is "HCO3-";  // CHEBI:17544
  species $cl in lumen; cl is "CL-";  // CHEBI:17996

  // Parameters:
  g_bi = 0.2 dimensionless;
  g_cl = 1 dimensionless;
  zeta = 50 m2_per_L;
  kbi = 1 mM;
  kcl = 10 mM;
  gnbc = 2 mmol_per_volt_per_sec_per_m2;
  gapl = 0.25 mmol_per_volt_per_sec_per_m2;
  gapbl = 0.005 mmol_per_volt_per_sec_per_m2;
  vr = 10 dimensionless;
  bi0 = 15 mM;
  buf = 0.1 L_per_sec_per_m2;
  gcftron = 1 L_per_volt_per_sec_per_m2;
  gcftrbase = 7e-5 L_per_volt_per_sec_per_m2;
  ek = -0.085 volt;
  gk = 1 mmol_per_volt_per_sec_per_m2;
  r = 8.31451 J_per_mol_per_K; r is "gas constant";
  f = 96485 C_per_mol; f is "Faraday constant";
  temp = 310 kelvin;
  ionstr = 160 mM;
  gnak = 3.125 mmol_per_volt_per_sec_per_m2;
  np0 = 25 mM;
  epump = -0.2 volt;
  gnaleak = 0.4 mmol_per_volt_per_sec_per_m2;
  jac = 0.025 mmol_per_sec_per_m2;
  rat = 0.25 dimensionless;
  ton = 60 second;
  toff = 360 second;
  gcftr = gcftrbase; gcftr has L_per_volt_per_sec_per_m2;
  eb has volt;
  enbc has volt;
  ec has volt;
  ena has volt;
  kccf has mmol_per_volt_per_sec_per_m2;
  kbcf has mmol_per_volt_per_sec_per_m2;
  knbc has mmol_per_volt_per_sec_per_m2;
  v has volt;
  jnbc has mmol_per_sec_per_m2;
  jbcftr has mmol_per_sec_per_m2;
  jccftr has mmol_per_sec_per_m2;
  japl has mmol_per_sec_per_m2;
  japbl has mmol_per_sec_per_m2;
  jlum has L_per_sec_per_m2;
  jnak has mmol_per_sec_per_m2;
  jnaleak has mmol_per_sec_per_m2;

  // Assignment rules:
  cl := 160 - bl;
  eb := r*temp/f*ln(bi/bl);
  enbc := r*temp/f*ln(bi^2*ni/(bb^2*nb));
  ec := r*temp/f*ln(ci/cl);
  ena := r*temp/f*ln(nb/ni);
  kccf := g(ci, cl)*gcftr*g_cl;
  kbcf := g(bi, bl)*gcftr*g_bi;
  knbc := gnbc;
  v := (knbc*enbc + kbcf*eb + kccf*ec + gk*ek + gnaleak*ena)/(knbc + kbcf + kccf + gk);
  jnbc := knbc*(v - enbc);
  jbcftr := kbcf*(v - eb);
  jccftr := kccf*(v - ec);
  japl := ap(bl, bi, cl, ci, kbi, kcl)*gapl;
  japbl := ap(bb, bi, cb, ci, kbi, kcl)*gapbl;
  jlum := (-(jccftr + jbcftr)*vr + jac*(1 + rat))/ionstr;
  jnak := gnak*(v - epump)*(ni/np0)^3;
  jnaleak := gnaleak*(v - ena);

  // Reactions:
  nbc: 2 $bb + $nb -> 2 bi + ni; cell*zeta*japl;
  bcftr: bl -> bi; cell*zeta*jbcftr;
  ccftr: $cl -> ci; cell*zeta*jccftr;
  apl: bl + ci -> bi + $cl; cell*zeta*japl;
  apbl: $bb + ci -> bi + $cb; cell*zeta*japbl;
  nak: ni -> $nb; cell*zeta*jnak;
  naleak: ni -> $nb; cell*zeta*jnaleak;
  buffering: -> bi; cell*zeta*buf*(bi0 - bi);
  bac: -> bl; lumen*zeta*jac*rat;
  cac: -> $cl; lumen*zeta*jac;
  outflow: bl -> ; lumen*zeta*jlum*bl;

  // Events:
  at (time >= ton): gcftr = gcftron;
  at (time >= toff): gcftr = gcftrbase;

  // Unit definitions:
  unit substance = 1e-3 mole; substance is "mmol";
  unit mM = 1e-3 mole / litre;
  unit mmol_per_volt_per_sec_per_m2 = 1e-3 mole / (volt * second * metre^2); mmol_per_volt_per_sec_per_m2 is "mmol per volt per sec per m^2";
  unit L_per_volt_per_sec_per_m2 = litre / (volt * second * metre^2); L_per_volt_per_sec_per_m2 is "L per volt per sec per m^2";
  unit mmol_per_sec_per_m2 = 1e-3 mole / (second * metre^2); mmol_per_sec_per_m2 is "mmol per sec per m^2";
  unit m2_per_L = metre^2 / litre; m2_per_L is "m^2 per L";
  unit L_per_sec_per_m2 = litre / (second * metre^2); L_per_sec_per_m2 is "L per sec per m^2";
  unit J_per_mol_per_K = joule / (mole * kelvin);
  unit C_per_mol = coulomb / mole;
end
