// SBML level 2 version 4
// dcterms:bibliographicCitation: urn:miriam:pubmed:30290156

function Function_for_dAdt_Ca_Down(Ca_buffer, ILVA, IHVA, Ca_z, F, d)
  Ca_buffer*10*(ILVA + IHVA)/(Ca_z*F*d);
end

function Function_for_dAdt_V(INa, IK, ILVA, IH, INaP, IL, IHVA, IBK, IHVK, C)
  (INa + IK + ILVA + IH + INaP + IL + IHVA + IBK + IHVK)/C;
end

function Function_for_Ion(inf, ion, tau)
  (inf - ion)/tau;
end

function Function_for_dAdt_Ca_Up(Ca0, Ca, tau_Ca)
  (Ca0 - Ca)/tau_Ca;
end

model Viertel2019___A_Computational_model_of_the_mammalian_external_tufted_cell()
  // Viertel2019 - A Computational model of the mammalian external tufted cell
  // This is a mathematical conductance-based model of the bursting activity in external tufted (ET) cells of the olfactory bulb. The model includes ion-current based descriptions of the mechanisms underlying bursting in ET cells, with facilitation of blocking various currents to characterise bursting behaviour.
  // isDescribedBy pubmed:30290156
  // isDerivedFrom pubmed:25717156
  // isDerivedFrom pubmed:9497431
  // isDerivedFrom pubmed:21723921
  // hasProperty biomodels.teddy:TEDDY_0000055
  // hasProperty mamo:MAMO_0000046

  // Compartments:
  compartment compartment = 1;  // isVersionOf CL:1001503

  // Species:
  species V in compartment = -51.40853;
  species Ca in compartment = 0.0003983918;  // ncit:C331
  species nK in compartment = 0.0557063;  // hasProperty ncit:C48434; hasProperty ncit:C765
  species hNaP in compartment = 0.1392591;  // hasProperty ncit:C48434; hasProperty ncit:C830
  species hH in compartment = 0.1577331;  // hasProperty ncit:C48434
  species mLVA in compartment = 0.04862092;  // hasProperty ncit:C48434; hasProperty ncit:C331
  species hLVA in compartment = 0.2168302;  // hasProperty ncit:C331; hasProperty ncit:C48434
  species mBK in compartment = 0.1182234;  // hasProperty ncit:C765; hasProperty ncit:C48434
  species nHVK in compartment = 0.0493828;  // hasProperty ncit:C765; hasProperty ncit:C48434

  // Parameters:
  vL = -62.5;
  vH = -35;
  vNa = 45;
  vK = -105;
  vCa = 120;
  gL = 2.5;
  gH = 20;
  gNaP = 8.3244;
  gLVA = 15.0213;
  gNa = 29.17;
  gK = 12.96;
  gHVA = 2;
  gBK = 5;
  gHVK = 10;
  theta_mNa = -25;
  beta_mNa = -6.5;
  theta_nK = -26;
  beta_nK = -9;
  tau_nK = 10;
  theta_mLVA = -37.1;
  beta_mLVA = -4.8916;
  tau_mLVA = 40;
  theta_hLVA = -59.2;
  beta_hLVA = 11.2326;
  tau_hLVA = 350;
  theta_mHVA = -10;
  beta_mHVA = -6.5;
  theta_mNaP = -40;
  beta_mNaP = -4;
  theta_hNaP = -54;
  beta_hNaP = 5;
  tau_hNaP = 500;
  theta_hH = -61.32;
  beta_hH = 5.855;
  tau_hH_T = 100;
  delta_hH_T = 0.205;
  theta_hH_T = -65.95;
  beta_hH_T = 4.44;
  theta_mHVK = -40;
  beta_mHVK = -2;
  theta_nHVK = -30;
  beta_nHVK = -2;
  mBK_base = 170;
  beta_mBK = -15.6;
  Ca0 = 2e-5;
  tau_Ca = 8;
  Ca_buffer = 0.5;
  Ca_z = 2;
  d = 1;
  C = 21;
  F = 96485;

  // Assignment rules:
  hNaP_inf := 1/(1 + exp((V - theta_hNaP)/beta_hNaP));
  hH_inf := 1/(1 + exp((V - theta_hH)/beta_hH));
  nK_Inf := 1/(1 + exp((V - theta_nK)/beta_nK));
  mLVA_inf := 1/(1 + exp((V - theta_mLVA)/beta_mLVA));
  mHVA_inf := 1/(1 + exp((V - theta_mHVA)/beta_mHVA));
  mNa_inf := 1/(1 + exp((V - theta_mNa)/beta_mNa));
  mHVK_inf := 1/(1 + exp((V - theta_mHVK)/beta_mHVK));
  hLVA_inf := 1/(1 + exp((V - theta_hLVA)/beta_hLVA));
  mNaP_inf := 1/(1 + exp((V - theta_mNaP)/beta_mNaP));
  nHVK_inf := 1/(1 + exp((V - theta_nHVK)/beta_nHVK));
  p_mBK := 2.9 + 6.3*exp(-360*Ca);
  s := -25.3 + 107.5*exp(-120*Ca);
  theta_mBK := -20 + 59.2*exp(-90*Ca) + 96.7*exp(-470*Ca);
  mBK_inf := 1/(1 + exp((V - theta_mBK)/beta_mBK));
  f := 1/(10*(exp(-(V + 100 - s)/63.6) + exp((-150 + (V + 100 - s))/63.6))) - 5.2;
  IHVK := gHVK*mHVK_inf*nHVK*(V - vK);
  hH_tau := tau_hH_T*exp(delta_hH_T*(V - theta_hH_T)/beta_hH_T)/(1 + exp((V - theta_hH_T)/beta_hH_T));
  IL := gL*(V - vL);
  mBK_tau := -(p_mBK - 1)*(f - 0.2)/0.8 + mBK_base;
  IBK := gBK*mBK*(V - vK);
  nK_tau := tau_nK/cosh((V - theta_nK)/(2*beta_nK));
  INa := gNa*(1 - nK)*mNa_inf^3*(V - vNa);
  INaP := gNaP*mNaP_inf*hNaP*(V - vNa);
  IH := gH*hH*(V - vH);
  hLVA_tau := tau_hLVA/cosh((V - theta_hLVA)/(2*beta_hLVA));
  ILVA := gLVA*mLVA^2*hLVA*(V - vCa);
  IHVA := gHVA*mHVA_inf*(V - vCa);
  mLVA_tau := tau_mLVA/cosh((V - theta_mLVA)/(2*beta_mLVA));
  nHVK_tau := 1000/(1 + exp(-(V + 35))) + 1000;
  hNaP_tau := tau_hNaP/cosh((V - theta_hNaP)/(2*beta_hNaP));
  IK := gK*nK^4*(V - vK);

  // Reactions:
  dAdt_V: V => ; compartment*Function_for_dAdt_V(INa, IK, ILVA, IH, INaP, IL, IHVA, IBK, IHVK, C);  // isVersionOf GO:0051899
  dAdt_nK: => nK; compartment*Function_for_Ion(nK_Inf, nK, nK_tau);  // isVersionOf GO:0051899
  dAdt_hNaP: => hNaP; compartment*Function_for_Ion(hNaP_inf, hNaP, hNaP_tau);  // isVersionOf GO:0051899
  dAdt_hH: => hH; compartment*Function_for_Ion(hH_inf, hH, hH_tau);  // isVersionOf GO:0051899
  dAdt_mLVA: => mLVA; compartment*Function_for_Ion(mLVA_inf, mLVA, mLVA_tau);  // isVersionOf GO:0051899
  dAdt_hLVA: => hLVA; compartment*Function_for_Ion(hLVA_inf, hLVA, hLVA_tau);  // isVersionOf GO:0051899
  dAdt_mBK: => mBK; compartment*Function_for_Ion(mBK_inf, mBK, mBK_tau);  // isVersionOf GO:0051899
  dAdt_Ca_Up: => Ca; compartment*Function_for_dAdt_Ca_Up(Ca0, Ca, tau_Ca);  // isVersionOf GO:0051899
  dAdt_nHVK: => nHVK; compartment*Function_for_Ion(nHVK_inf, nHVK, nHVK_tau);  // isVersionOf GO:0051899
  dAdt_Ca_Down: Ca => ; compartment*Function_for_dAdt_Ca_Down(Ca_buffer, ILVA, IHVA, Ca_z, F, d);  // isVersionOf GO:0051899

  // Unit definitions:
  unit volume = 1e-3 litre;
  unit time = 1e-3 second;
  unit substance = item;
end
