// SBML level 2 version 4
// dcterms:bibliographicCitation: urn:miriam:pubmed:29351477

function NAMPT_Production_0(km10a, y8)
  km10a*y8;
end

function Bmal_Protein_Translation_0(k5b, y4)
  k5b*y4;
end

function ACTH_Production__1__1(CRH, FGRN_HPA, KP1, Phpa, kfp, kp2)
  kp2*CRH*(1 + kfp*Phpa)/(KP1 + FGRN_HPA);
end
ACTH_Production__1__1 is "ACTH Production [1]_1";

function FHPA_Production__1__1(ACTH, EntF, Phpa, kfp, kn, kp3)
  kp3*ACTH*kn*(1 + EntF/(1 + EntF))*(1 + kfp*Phpa);
end
FHPA_Production__1__1 is "FHPA Production [1]_1";

function ACTH_Degradation_1(ACTH, Kd2, Vd2)
  Vd2*ACTH/(Kd2 + ACTH);
end

function FHPA_Degradation_1(F_HPA, Kd3, Vd3)
  Vd3*F_HPA/(Kd3 + F_HPA);
end

function F_Cell__1__1(F_Cell, F_HPA, tau)
  1/tau*(F_HPA - F_Cell);
end
F_Cell__1__1 is "F Cell [1]_1";

function CRH_Production_1(FGRN_HPA, KP1, kp1)
  kp1/(KP1 + FGRN_HPA);
end

function PER_CRY_mRNA_Production_1__1__1(P, c, k1b, k1i, kf, p, v1b, y3, y7)
  v1b*(y7 + c)/(k1b*(1 + (y3/k1i)^p))*(1 + kf*P);
end
PER_CRY_mRNA_Production_1__1__1 is "PER/CRY mRNA Production 1 [1]_1";

function MR_Degradation_1(KMRdeg, MR, kmrgeg)
  kmrgeg*MR/(KMRdeg + MR);
end

function PGC1a___mRNA_Production_1(FOXO1, kg1)
  kg1*(1 + FOXO1);
end
PGC1a___mRNA_Production_1 is "PGC1a - mRNA Production_1";

function FOXO1_Production_1(PGC1aNact, kg9)
  kg9*PGC1aNact;
end

function PER_CRY_Nuclear_degradation_1(SIRT1, k3d, y3)
  k3d*y3*(1 + SIRT1);
end
PER_CRY_Nuclear_degradation_1 is "PER/CRY Nuclear degradation_1";

function Bmal_mRNA_Transcription_1(PGC1aNact, k4b, kg13, r, v4b, y3)
  v4b*y3^r/(k4b^r + y3^r)*(1 + kg13*PGC1aNact);
end

function PER_CRY_mRNA_Production_2__1__1(FGRN_Cell, kc, y7)
  kc*FGRN_Cell/y7;
end
PER_CRY_mRNA_Production_2__1__1 is "PER/CRY mRNA Production 2 [1]_1";

function PER_CRY_Protein_Translation_1(k2b, q, y1)
  k2b*y1^q;
end
PER_CRY_Protein_Translation_1 is "PER/CRY Protein Translation_1";

function NAD_to_NAM_1(KM4, NAD, km4)
  km4*NAD/(KM4 + NAD);
end

function NMN_to_NAD_1(KM2, NMN, km2)
  km2*NMN/(KM2 + NMN);
end

function SIRT1_Inhibition_1(KM7, SIRT1, km7)
  km7*SIRT1/(KM7 + SIRT1);
end

function Bmal_Protein_Translation_1(PGC1amRNA, k5b)
  k5b*PGC1amRNA;
end

function MR_Production_1(F_Cell, KMR, Kfmr, MR, MRt, kfmr, kmr)
  kmr*((1 + kfmr*F_Cell/(Kfmr + F_Cell))*(MRt - MR)/(KMR + MRt - MR));
end

function GR_Degradation_2(GR_HPA, KGRdeg, kgrgeg)
  kgrgeg*GR_HPA/(KGRdeg + GR_HPA);
end

function Feed2_1(Feed, Tf, feed2)
  1/Tf*(Feed - feed2);
end

function EntF_Production_1(KM11, NAD, km11)
  km11*NAD/(KM11 + NAD);
end

function Feed3_1(Tf, feed2, feed3)
  1/Tf*(feed2 - feed3);
end

function NAD_degradation_1(KM3, NAD, feed3, km3)
  km3*feed3*NAD/(KM3 + NAD);
end

function SIRT1_Production_1(KM6, NAD, SIRT1, km6, sirt)
  km6*NAD*(sirt - SIRT1)/(KM6 + sirt - SIRT1);
end

function PGC1aN_to_PGC1aNactive_1(PGC1aNact, SIRT1, kg5)
  kg5*PGC1aNact*SIRT1;
end

function PGC1aNact_to_PGC1aN_1(PGC1aN, SIRT1, kg5)
  kg5*PGC1aN*(1 + SIRT1);
end

function NAD_Production_1_1(KM1, NAD, km1, nad)
  km1*(nad - NAD)/(KM1 + nad - NAD);
end

function NAM_to_NMN_1(KM5, NAM, NAMPT, km5)
  km5*NAMPT*NAM/(KM5 + NAM);
end

function Phpa_Production_1(P, Phpa, Tf)
  1/Tf*(P - Phpa);
end

function CRH_Degradation_1(CRH, Kd1, L, Vd1)
  Vd1*CRH*(1 + L/(1 + L))/(Kd1 + CRH);
end

function GR_Production_1(F_Cell, GR_Cell, GRt, KGR, Kfgr, kfgr, kgr)
  kgr*((1 + kfgr*F_Cell/(Kfgr + F_Cell))*(GRt - GR_Cell)/(KGR + GRt - GR_Cell));
end

function Rate_Law_for_F_MR_Binding_1(F_Cell, MR, kb)
  kb*MR*F_Cell;
end
Rate_Law_for_F_MR_Binding_1 is "Rate Law for F-MR Binding_1";

function P_cytokine_mRNA_Production_1(FGRN_Cell, Kfr, Kpc, PR, kfr, kmrnap, kpc, y6)
  kmrnap*(1 - kfr*FGRN_Cell/(Kfr + FGRN_Cell))*(1 - kpc*y6/(Kpc + y6))*(1 + PR);
end

function Bmal_Protein_Translation_3(k5b, mRNARP)
  k5b*mRNARP;
end

function GR_Production_2(F_HPA, GR_HPA, GRt, KGR, Kfgr, kfgr, kgr)
  kgr*((1 + kfgr*F_HPA/(Kfgr + F_HPA))*(GRt - GR_HPA)/(KGR + GRt - GR_HPA));
end

function Rate_Law_for_F_MR_Binding_3(P, Rp, kb)
  kb*Rp*P;
end
Rate_Law_for_F_MR_Binding_3 is "Rate Law for F-MR Binding_3";

function PckG6P_Production_1(FGRN_Cell, FOXO1, kg11, kg7, s, y3)
  kg11*FOXO1*FGRN_Cell*(1/(1 + (y3/kg7)^s));
end

function GR_Degradation_1(GR_Cell, KGRdeg, kgrgeg)
  kgrgeg*GR_Cell/(KGRdeg + GR_Cell);
end

function Bmal_Protein_Translation_2(k5b, mRNAP)
  k5b*mRNAP;
end

function P_Receptor_production_1(FMRN, Kfr, kfr, kmrnaRp)
  kmrnaRp*(1 - kfr*FMRN/(Kfr + FMRN));
end

function Rate_Law_for_F_MR_Binding_2(F_Cell, GR_Cell, kb)
  kb*GR_Cell*F_Cell;
end
Rate_Law_for_F_MR_Binding_2 is "Rate Law for F-MR Binding_2";

function Rate_Law_for_F_MR_Binding_4(F_HPA, GR_HPA, kb)
  kb*GR_HPA*F_HPA;
end
Rate_Law_for_F_MR_Binding_4 is "Rate Law for F-MR Binding_4";

model Bae2017___Mathematical_analysis_of_circadian_disruption_and_metabolic_re_entrainment_of_hepatic_gluconeogenesis()
  // Bae2017 - Mathematical analysis of circadian disruption and metabolic re-entrainment of hepatic gluconeogenesis
  // The circadian rhythms influence the metabolic activity from molecular level to tissue, organ, and host level. Disruption of the circadian rhythms manifests to the host's health as metabolic syndromes, including obesity, diabetes, and elevated plasma glucose, eventually leading to cardiovascular diseases. Therefore, it is imperative to understand the mechanism behind the relationship between circadian rhythms and metabolism. To start answering this question, we propose a semimechanistic mathematical model to study the effect of circadian disruption on hepatic gluconeogenesis in humans. Our model takes the light-dark cycle and feeding-fasting cycle as two environmental inputs that entrain the metabolic activity in the liver. The model was validated by comparison with data from mice and rat experimental studies. Formal sensitivity and uncertainty analyses were conducted to elaborate on the driving forces for hepatic gluconeogenesis. Furthermore, simulating the impact of Clock gene knockout suggests that modification to the local pathways tied most closely to the feeding-fasting rhythms may be the most efficient way to restore the disrupted glucose metabolism in liver.
  // hasProperty mamo:MAMO_0000046 ncit:C39030
  // isDescribedBy pubmed:29351477
  // hasTaxon taxonomy:10116 taxonomy:10090
  // hasProperty ncit:C39030 mamo:MAMO_0000046
  // biomodels.db:MODEL2103050001 biomodels.db:BIOMD0000001005

  // Compartments:
  compartment HPA = 1;  // UBERON:0004092
  compartment Cell = 1;  // BTO:0000575
  compartment Nucleus = 1;  // GO:0005634

  // Species:
  species CRH in HPA = 1;  // CHEBI:65311
  species ACTH in HPA = 1;  // CHEBI:3892
  species F_HPA in HPA = 1;  // uniprot:P08185
  species F_Cell in Cell = 1;  // uniprot:P08185
  species y1 in Cell = 1; y1 is "PER/CRY_mRNA";  // hasProperty ensembl:ENSG00000132326.12; isEncodedBy ensembl:ENSG00000008405; isEncodedBy ensembl:ENSG00000179094.16; isEncodedBy ensembl:ENSG00000121671
  species y2 in Cell = 1; y2 is "PER/CRY_mRNA_cytoplasm";  // hasPart uniprot:O15534; hasPart uniprot:Q16526
  species y3 in Nucleus = 1; y3 is "PER/CRY_mRNA_nucleus";  // hasPart uniprot:Q16526; hasPart uniprot:O15534; occursIn GO:0005634
  species y4 in Cell = 1; y4 is "BMAL1_mRNA";  // isEncodedBy ensembl:ENSG00000133794
  species y5 in Cell = 1; y5 is "BMAL1_mRNA_cytoplasm";  // uniprot:O00327
  species y6 in Nucleus = 1; y6 is "BMAL1_mRNA_nucleus";  // uniprot:O00327; occursIn GO:0005634
  species y7 in Nucleus = 1; y7 is "BMAL1/CLOCK_complex";  // hasPart uniprot:O15516; hasPart uniprot:O00327; occursIn GO:0005634
  species NAD in Cell = 1;  // CHEBI:15846
  species NMN in Cell = 1;  // CHEBI:50383
  species NAM in Cell = 1;  // CHEBI:17154
  species EntF in Cell = 1;  // hasProperty NCIT:C52711; hasProperty NCIT:C52711
  species SIRT1 in Cell = 1;  // uniprot:Q96EB6
  species y8 in Nucleus = 1; y8 is "BMAL1/CLOCK/SIRT1_complex";  // hasPart uniprot:O00327; hasPart uniprot:O15516; hasPart uniprot:Q96EB6; occursIn GO:0005634
  species NAMPT in Cell = 1;  // uniprot:P43490
  species feed2 in HPA = 1;  // hasProperty NCIT:C88198; hasProperty NCIT:C88198
  species feed3 in HPA = 1;  // hasProperty NCIT:C88198; hasProperty NCIT:C88198
  species PGC1amRNA in Cell = 1;  // isEncodedBy ensembl:ENSG00000109819.9
  species PGC1a in Cell = 1;  // uniprot:Q9UBK2
  species PGC1aN in Nucleus = 1;  // uniprot:Q9UBK2; occursIn GO:0005634
  species PGC1aNact in Nucleus = 1;  // uniprot:Q9UBK2; occursIn GO:0005634
  species FOXO1 in Cell = 1;  // uniprot:Q12778
  species PckG6p in Cell = 1;  // isEncodedBy ensembl:ENSG00000131482; isEncodedBy ensembl:ENSG00000124253
  species Phpa in HPA = 1;  // hasProperty ncit:C39129; hasProperty ncit:C39129
  species MR in Cell = 1;  // uniprot:P08235
  species GR_Cell in Cell = 1;  // uniprot:P04150
  species FGR_Cell in Cell = 1;  // hasPart uniprot:P04150; hasPart uniprot:P08185
  species FMR in Cell = 1;  // hasPart uniprot:P08185; hasPart uniprot:P08235
  species FMRN in Nucleus = 1;  // hasPart uniprot:P08235; hasPart uniprot:P08185; occursIn GO:0005634
  species FGRN_Cell in Nucleus = 1;  // hasPart uniprot:P04150; hasPart uniprot:P08185; occursIn GO:0005634
  species P in Cell = 1;  // hasProperty NCIT:C39129; hasProperty NCIT:C39129
  species mRNAP in Cell = 1;  // hasProperty NCIT:C39129; hasProperty NCIT:C39129
  species mRNARP in Cell = 1;  // hasProperty NCIT:C39129; hasProperty NCIT:C39129
  species Rp in Cell = 1;  // hasProperty NCIT:C39129; hasProperty NCIT:C39129
  species PR in Cell = 1;  // hasProperty NCIT:C39129; hasProperty NCIT:C39129
  species GR_HPA in HPA = 1;  // uniprot:P04150
  species FGR_HPA in HPA = 1;  // hasPart uniprot:P04150; hasPart uniprot:P08185
  species FGRN_HPA in HPA = 1;  // hasPart uniprot:P04150; hasPart uniprot:P08185; occursIn GO:0005634

  // Parameters:
  L has unit_0; L is "Light";
  Feed has unit_0;

  // Assignment rules:
  L := piecewise(1, (piecewise(time - 24*ceil(time/24), xor(time < 0, 24 < 0), time - 24*floor(time/24)) >= 6) && (piecewise(time - 24*ceil(time/24), xor(time < 0, 24 < 0), time - 24*floor(time/24)) <= 18), 0);
  Feed := piecewise(1, (piecewise(time - 24*ceil(time/24), xor(time < 0, 24 < 0), time - 24*floor(time/24)) >= 6) && (piecewise(time - 24*ceil(time/24), xor(time < 0, 24 < 0), time - 24*floor(time/24)) <= 18), 0);

  // Reactions:
  CRH_Production: => CRH; HPA*CRH_Production_1(FGRN_HPA, CRH_Production_KP1, kp1);  // modifiers: FGRN_HPA
    CRH_Production_KP1 = 1.0577; kp1 = 0.7965;
  ACTH_Production: => ACTH; HPA*ACTH_Production__1__1(CRH, FGRN_HPA, ACTH_Production_KP1, Phpa, ACTH_Production_kfp, kp2);  // modifiers: CRH, FGRN_HPA, Phpa
    ACTH_Production_KP1 = 1.0577; ACTH_Production_kfp = 0.15; kp2 = 0.6875;
  ACTH_Degradation: ACTH => ; HPA*ACTH_Degradation_1(ACTH, Kd2, Vd2);
    Kd2 = 0.3069; Vd2 = 0.5129;
  F_HPA__Production: => F_HPA; FHPA_Production__1__1(ACTH, EntF, Phpa, F_HPA__Production_kfp, kn, kp3); F_HPA__Production is "F(HPA) Production";  // modifiers: ACTH, EntF, Phpa
    F_HPA__Production_kfp = 0.15; kn = 1.2; kp3 = 1.0302;
  F_HPA__Degradation: F_HPA => ; HPA*FHPA_Degradation_1(F_HPA, Kd3, Vd3); F_HPA__Degradation is "F(HPA) Degradation";
    Kd3 = 0.4695; Vd3 = 0.3618;
  F__Cell: => F_Cell; F_Cell__1__1(F_Cell, F_HPA, tau); F__Cell is "F (Cell)";  // modifiers: F_HPA
    tau = 0.25;
  PER_CRY_mRNA_Production_1: => y1; PER_CRY_mRNA_Production_1__1__1(P, c, k1b, k1i, kf, p, v1b, y3, y7); PER_CRY_mRNA_Production_1 is "PER/CRY mRNA Production 1";  // modifiers: y7, y3, P
    c = 0.1; k1b = 1; k1i = 0.56; kf = 0.12; p = 8; v1b = 9;
  PER_CRY_mRNA_Production_2: => y1; PER_CRY_mRNA_Production_2__1__1(FGRN_Cell, kc, y7); PER_CRY_mRNA_Production_2 is "PER/CRY mRNA Production 2";  // modifiers: y7, FGRN_Cell
    kc = 9e-6;
  PER_CRY_mRNA_Degradation: y1 => ; Cell*PER_CRY_mRNA_Degradation_k1*y1; PER_CRY_mRNA_Degradation is "PER/CRY mRNA Degradation";
    PER_CRY_mRNA_Degradation_k1 = 0.12;
  PER_CRY_Cell_Translation: => y2; Cell*PER_CRY_Protein_Translation_1(k2b, q, y1); PER_CRY_Cell_Translation is "PER/CRY Cell Translation";  // modifiers: y1
    k2b = 0.3; q = 2;
  PER_CRY_Cell_Degradation: y2 => ; Cell*PER_CRY_Cell_Degradation_k1*y2; PER_CRY_Cell_Degradation is "PER/CRY Cell Degradation";
    PER_CRY_Cell_Degradation_k1 = 0.05;
  PER_CRY__Cell_to_Nucleus: y2 => y3; PER_CRY__Cell_to_Nucleus_k1*y2; PER_CRY__Cell_to_Nucleus is "PER/CRY (Cell to Nucleus)";
    PER_CRY__Cell_to_Nucleus_k1 = 0.24;
  PER_CRY__Nucleus_to_Cytoplasm: y3 => y2; PER_CRY__Nucleus_to_Cytoplasm_k1*y3; PER_CRY__Nucleus_to_Cytoplasm is "PER/CRY (Nucleus to Cytoplasm)";
    PER_CRY__Nucleus_to_Cytoplasm_k1 = 0.02;
  PER_CRY_Nucleus_Degradation: y3 => ; PER_CRY_Nuclear_degradation_1(SIRT1, k3d, y3); PER_CRY_Nucleus_Degradation is "PER/CRY Nucleus Degradation";  // modifiers: SIRT1
    k3d = 0.02;
  Bmal_mRNA_Production: => y4; Bmal_mRNA_Transcription_1(PGC1aNact, k4b, kg13, r, v4b, y3);  // modifiers: y3, PGC1aNact
    k4b = 2.16; kg13 = 0.3; r = 3; v4b = 0.72;
  Bmal_mRNA_Degradation: y4 => ; Cell*Bmal_mRNA_Degradation_k1*y4;
    Bmal_mRNA_Degradation_k1 = 0.75;
  Bmal_Protein_Translation: => y5; Cell*Bmal_Protein_Translation_0(Bmal_Protein_Translation_k5b, y4);  // modifiers: y4
    Bmal_Protein_Translation_k5b = 0.24;
  Bmal_Translocation: y5 -> y6; Bmal_Translocation_k1*y5 - Bmal_Translocation_k2*y6;
    Bmal_Translocation_k1 = 0.45; Bmal_Translocation_k2 = 0.06;
  Bmal_Clock_Association: y6 => y7; Nucleus*Bmal_Clock_Association_k1*y6;
    Bmal_Clock_Association_k1 = 1;
  Bmal_Clock_Dissociation: y7 => y6; Nucleus*Bmal_Clock_Dissociation_k1*y7;
    Bmal_Clock_Dissociation_k1 = 0.1;
  Bmal_Cell_Degradation: y5 => ; Cell*Bmal_Cell_Degradation_k1*y5;
    Bmal_Cell_Degradation_k1 = 0.06;
  Bmal_Nucleus_Degradation: y6 => ; Nucleus*Bmal_Nucleus_Degradation_k1*y6;
    Bmal_Nucleus_Degradation_k1 = 0.12;
  Bmal_Clock_Degradation: y7 => ; Nucleus*Bmal_Clock_Degradation_k1*y7;
    Bmal_Clock_Degradation_k1 = 0.5;
  CRH_Degradation: CRH => ; HPA*CRH_Degradation_1(CRH, Kd1, L, Vd1);
    Kd1 = 1.9627; Vd1 = 0.5084;
  NAD_Production: => NAD; Cell*NAD_Production_1_1(KM1, NAD, km1, nad);
    KM1 = 2; km1 = 5; nad = 1;
  NMN_to_NAD: NMN => NAD; Cell*NMN_to_NAD_1(KM2, NMN, km2);
    KM2 = 1; km2 = 40;
  NAD_Inhibition: NAD => ; NAD_degradation_1(KM3, NAD, feed3, km3);  // modifiers: feed3
    KM3 = 1; km3 = 5;
  NAD_to_NAM: NAD => NAM; Cell*NAD_to_NAM_1(KM4, NAD, km4);
    KM4 = 20; km4 = 20;
  NAM_to_NMN: NAM => NMN; Cell*NAM_to_NMN_1(KM5, NAM, NAMPT, km5);  // modifiers: NAMPT
    KM5 = 5; km5 = 40;
  EntF_Production: => EntF; Cell*EntF_Production_1(KM11, NAD, km11);  // modifiers: NAD
    KM11 = 2; km11 = 5;
  EntF_Degradation: EntF => ; Cell*EntF_Degradation_k1*EntF;
    EntF_Degradation_k1 = 1;
  SIRT1_Prod: => SIRT1; Cell*SIRT1_Production_1(KM6, NAD, SIRT1, km6, sirt);  // modifiers: NAD
    KM6 = 1; km6 = 5; sirt = 5;
  SIRT1_Degradation: SIRT1 => ; Cell*SIRT1_Inhibition_1(KM7, SIRT1, km7);
    KM7 = 1; km7 = 2;
  Bmal_Clock___Sirt1_Association: y7 + SIRT1 -> y8; Bmal_Clock___Sirt1_Association_k1*y7*SIRT1 - Bmal_Clock___Sirt1_Association_k2*y8; Bmal_Clock___Sirt1_Association is "Bmal/Clock - Sirt1 Association";
    Bmal_Clock___Sirt1_Association_k1 = 10; Bmal_Clock___Sirt1_Association_k2 = 20;
  Bmal_Clock___Sirt1_Degradation: y8 => ; Nucleus*Bmal_Clock___Sirt1_Degradation_k1*y8; Bmal_Clock___Sirt1_Degradation is "Bmal/Clock - Sirt1 Degradation";
    Bmal_Clock___Sirt1_Degradation_k1 = 0.1;
  NAMPT_Production: => NAMPT; NAMPT_Production_0(km10a, y8);  // modifiers: y8
    km10a = 2;
  NAMPT_Degradation: NAMPT => ; Cell*NAMPT_Degradation_k1*NAMPT;
    NAMPT_Degradation_k1 = 2;
  Feed_2: => feed2; HPA*Feed2_1(Feed, Feed_2_Tf, feed2);
    Feed_2_Tf = 3;
  Feed_3: => feed3; HPA*Feed3_1(Feed_3_Tf, feed2, feed3);  // modifiers: feed2
    Feed_3_Tf = 3;
  PGC1a_mRNA_Production: => PGC1amRNA; Cell*PGC1a___mRNA_Production_1(FOXO1, kg1);  // modifiers: FOXO1
    kg1 = 0.002;
  PGC1a_mRNA_Degradation: PGC1amRNA => ; Cell*PGC1a_mRNA_Degradation_k1*PGC1amRNA;
    PGC1a_mRNA_Degradation_k1 = 0.2;
  PGC1a_Protein_Degraadation: PGC1a => ; Cell*PGC1a_Protein_Degraadation_k1*PGC1a; PGC1a_Protein_Degraadation is "PGC1a Protein Degradation";
    PGC1a_Protein_Degraadation_k1 = 3;
  PGC1a_Cell_to_Nucleus: PGC1a => PGC1aN; PGC1a_Cell_to_Nucleus_k1*PGC1a;
    PGC1a_Cell_to_Nucleus_k1 = 2;
  PGC1a_Nucleus_to_Cell: PGC1aN => PGC1a; PGC1a_Nucleus_to_Cell_k1*PGC1aN;
    PGC1a_Nucleus_to_Cell_k1 = 0.2;
  PGC1aNactive_to_PGC1aN: PGC1aNact => PGC1aN; Nucleus*PGC1aNactive_to_PGC1aN_k1*PGC1aNact;
    PGC1aNactive_to_PGC1aN_k1 = 0.5;
  PGC1aN_to_PGC1aNactive: PGC1aN => ; PGC1aN_to_PGC1aNactive_1(PGC1aNact, SIRT1, PGC1aN_to_PGC1aNactive_kg5);  // modifiers: PGC1aNact, SIRT1
    PGC1aN_to_PGC1aNactive_kg5 = 0.1;
  PGCNactive_Degradation: PGC1aNact => ; Nucleus*PGCNactive_Degradation_k1*PGC1aNact;
    PGCNactive_Degradation_k1 = 0.8;
  FOXO1_Production: => FOXO1; FOXO1_Production_1(PGC1aNact, kg9);  // modifiers: PGC1aNact
    kg9 = 3;
  FOXO1_Degradation: FOXO1 => ; Cell*FOXO1_Degradation_k1*FOXO1;
    FOXO1_Degradation_k1 = 5;
  Pck1_G6pc_Degradation: PckG6p => ; Cell*Pck1_G6pc_Degradation_k1*PckG6p; Pck1_G6pc_Degradation is "Pck1/G6pc Degradation";
    Pck1_G6pc_Degradation_k1 = 3;
  PGC1a_Translation: => PGC1a; Cell*Bmal_Protein_Translation_1(PGC1amRNA, PGC1a_Translation_k5b);  // modifiers: PGC1amRNA
    PGC1a_Translation_k5b = 3;
  PGC1aNactivation: => PGC1aNact; PGC1aNact_to_PGC1aN_1(PGC1aN, SIRT1, PGC1aNactivation_kg5);  // modifiers: PGC1aN, SIRT1
    PGC1aNactivation_kg5 = 0.1;
  Phpa_0: => Phpa; Phpa_Production_1(P, Phpa, Phpa_0_Tf);  // modifiers: P
    Phpa_0_Tf = 0.25;
  MR_Production: => MR; Cell*MR_Production_1(F_Cell, KMR, Kfmr, MR, MRt, kfmr, kmr);  // modifiers: F_Cell
    KMR = 0.21; Kfmr = 0.5; MRt = 1.45; kfmr = 1.011; kmr = 0.34;
  GR_Production: => GR_Cell; Cell*GR_Production_1(F_Cell, GR_Cell, GR_Production_GRt, GR_Production_KGR, GR_Production_Kfgr, GR_Production_kfgr, GR_Production_kgr);  // modifiers: F_Cell
    GR_Production_GRt = 1.81; GR_Production_KGR = 0.74; GR_Production_Kfgr = 30; GR_Production_kfgr = 15; GR_Production_kgr = 1.18;
  MR_Degradation: MR => ; Cell*MR_Degradation_1(KMRdeg, MR, kmrgeg);
    KMRdeg = 1.65; kmrgeg = 0.7;
  GR_Degradation: GR_Cell => ; Cell*GR_Degradation_1(GR_Cell, GR_Degradation_KGRdeg, GR_Degradation_kgrgeg);
    GR_Degradation_KGRdeg = 1.05; GR_Degradation_kgrgeg = 1.52;
  F_MR_Binding: MR => FMR; Cell*Rate_Law_for_F_MR_Binding_1(F_Cell, MR, F_MR_Binding_kb); F_MR_Binding is "F-MR Binding";  // modifiers: F_Cell
    F_MR_Binding_kb = 3.29;
  F_GR_Binding: GR_Cell -> FGR_Cell; Cell*Rate_Law_for_F_MR_Binding_2(F_Cell, GR_Cell, F_GR_Binding_kb); F_GR_Binding is "F-GR Binding";  // modifiers: F_Cell
    F_GR_Binding_kb = 3.29;
  FMR_Translocation: FMR => FMRN; FMR_Translocation_k1*FMR;
    FMR_Translocation_k1 = 1;
  FGR_Translocation: FGR_Cell => FGRN_Cell; FGR_Translocation_k1*FGR_Cell;
    FGR_Translocation_k1 = 1;
  FMRN_Recycling: FMRN => MR; FMRN_Recycling_k1*FMRN;
    FMRN_Recycling_k1 = 1;
  FGRN_Recycling: FGRN_Cell => GR_Cell; FGRN_Recycling_k1*FGRN_Cell;
    FGRN_Recycling_k1 = 1;
  P_cyt_mRNA_Production: => mRNAP; P_cytokine_mRNA_Production_1(FGRN_Cell, P_cyt_mRNA_Production_Kfr, Kpc, PR, P_cyt_mRNA_Production_kfr, kmrnap, kpc, y6);  // modifiers: FGRN_Cell, y6, PR
    P_cyt_mRNA_Production_Kfr = 0.5; Kpc = 25; P_cyt_mRNA_Production_kfr = 0.8; kmrnap = 0.61; kpc = 0.3;
  P_cyt_mRNA_Degradation: mRNAP => ; Cell*P_cyt_mRNA_Degradation_k1*mRNAP;
    P_cyt_mRNA_Degradation_k1 = 0.19;
  P_cyt_Translation: => P; Cell*Bmal_Protein_Translation_2(P_cyt_Translation_k5b, mRNAP);  // modifiers: mRNAP
    P_cyt_Translation_k5b = 0.29;
  P_cyt_Degradation: P => ; Cell*P_cyt_Degradation_k1*P;
    P_cyt_Degradation_k1 = 1.06;
  P_cyt_Receptor_mRNA_Production: => mRNARP; P_Receptor_production_1(FMRN, P_cyt_Receptor_mRNA_Production_Kfr, P_cyt_Receptor_mRNA_Production_kfr, kmrnaRp);  // modifiers: FMRN
    P_cyt_Receptor_mRNA_Production_Kfr = 0.5; P_cyt_Receptor_mRNA_Production_kfr = 0.8; kmrnaRp = 0.61;
  P_cyt_Receptor_mRNA_Degradation: mRNARP => ; Cell*P_cyt_Receptor_mRNA_Degradation_k1*mRNARP;
    P_cyt_Receptor_mRNA_Degradation_k1 = 0.19;
  P_cyt_Receptor_Translation: => Rp; Cell*Bmal_Protein_Translation_3(P_cyt_Receptor_Translation_k5b, mRNARP);  // modifiers: mRNARP
    P_cyt_Receptor_Translation_k5b = 1.11;
  P_cyt_Receptor_Degradation: Rp => ; Cell*P_cyt_Receptor_Degradation_k1*Rp;
    P_cyt_Receptor_Degradation_k1 = 0.26;
  P_R_Binding: Rp => PR; Cell*Rate_Law_for_F_MR_Binding_3(P, Rp, P_R_Binding_kb); P_R_Binding is "P-R Binding";  // modifiers: P
    P_R_Binding_kb = 0.14;
  GR_Degradation_copy: GR_HPA => ; HPA*GR_Degradation_2(GR_HPA, GR_Degradation_copy_KGRdeg, GR_Degradation_copy_kgrgeg);
    GR_Degradation_copy_KGRdeg = 1.05; GR_Degradation_copy_kgrgeg = 1.52;
  GR_Production_copy: => GR_HPA; HPA*GR_Production_2(F_HPA, GR_HPA, GR_Production_copy_GRt, GR_Production_copy_KGR, GR_Production_copy_Kfgr, GR_Production_copy_kfgr, GR_Production_copy_kgr);  // modifiers: F_HPA
    GR_Production_copy_GRt = 1.81; GR_Production_copy_KGR = 0.74; GR_Production_copy_Kfgr = 30; GR_Production_copy_kfgr = 15; GR_Production_copy_kgr = 1.18;
  F_GR_Binding_copy: GR_HPA -> FGR_HPA; HPA*Rate_Law_for_F_MR_Binding_4(F_HPA, GR_HPA, F_GR_Binding_copy_kb); F_GR_Binding_copy is "F-GR Binding_copy";  // modifiers: F_HPA
    F_GR_Binding_copy_kb = 3.29;
  FGR_Translocation_copy: FGR_HPA => FGRN_HPA; HPA*FGR_Translocation_copy_k1*FGR_HPA;
    FGR_Translocation_copy_k1 = 1;
  FGRN_Recycling_copy: FGRN_HPA => GR_HPA; HPA*FGRN_Recycling_copy_k1*FGRN_HPA;
    FGRN_Recycling_copy_k1 = 1;
  PR_Degradation: PR => ; Cell*PR_Degradation_k1*PR;
    PR_Degradation_k1 = 1.3;
  PckG6p_Production: => PckG6p; PckG6P_Production_1(FGRN_Cell, FOXO1, kg11, kg7, s, y3);  // modifiers: FOXO1, FGRN_Cell, y3
    kg11 = 70; kg7 = 1; s = 8;

  // Unit definitions:
  unit substance = 1e-9 mole;
  unit unit_0 = dimensionless^0; unit_0 is "1";
  unit length = metre;
  unit area = metre^2;
  unit volume = 1e-3 litre;
  unit time = 3.6e7 second;
end
