// SBML level 3 version 1

model repressilator(GFP, Degradation_GFP)
  // Created by iBioSim flatten routine
  // model units - substance: mole, volume: litre

  // Compartments:
  compartment Cell = 1;

  // Species:
  substanceOnly species CI in Cell = 0;
  substanceOnly species LacI in Cell = 0;
  substanceOnly species TetR in Cell = 0;
  substanceOnly species GFP in Cell = 0;
  substanceOnly species P0 in Cell = 2;
  substanceOnly species P1 in Cell = 2;
  substanceOnly species P2 in Cell = 2;
  substanceOnly species P1_RNAP in Cell = 0;
  substanceOnly species P1_LacI_bound in Cell = 0;
  substanceOnly species P0_RNAP in Cell = 0;
  substanceOnly species P0_CI_bound in Cell = 0;
  substanceOnly species P2_RNAP in Cell = 0;
  substanceOnly species P2_TetR_bound in Cell = 0;
  substanceOnly species RNAP in Cell = 30;
  substanceOnly species Cell__RNAP in Cell = 30;

  // Parameters:
  kd = 0.0075; kd is "Degradation rate";
  kr_f = 0.5; kr_f is "Forward repression binding rate";
  kr_r = 1; kr_r is "Reverse repression binding rate";
  ka_f = 0.0033; ka_f is "Forward activation binding rate";
  ka_r = 1; ka_r is "Reverse activation binding rate";
  ko_f = 0.033; ko_f is "Forward RNAP binding rate";
  ko_r = 1; ko_r is "Reverse RNAP binding rate";
  kao_f = 1; kao_f is "Forward activated RNAP binding rate";
  kao_r = 1; kao_r is "Reverse activated RNAP binding rate";
  nc = 2; nc is "Stoichiometry of binding";
  nr = 30; nr is "Initial RNAP count";
  ko = 0.05; ko is "Open complex production rate";
  kb = 0.0001; kb is "Basal production rate";
  ng = 2; ng is "Initial promoter count";
  np = 10; np is "Stoichiometry of production";
  ka = 0.25; ka is "Activated production rate";

  // Reactions:
  Degradation_CI: CI => ; Degradation_CI_kd*CI;
    Degradation_CI_kd = 0.0075 u_1_second_n1;
  Degradation_GFP: GFP => ; Degradation_GFP_kd*GFP;
    Degradation_GFP_kd = 0.0075 u_1_second_n1;
  Degradation_TetR: TetR => ; Degradation_TetR_kd*TetR;
    Degradation_TetR_kd = 0.0075 u_1_second_n1;
  R_constitutive_production_P1: => 10 TetR; R_constitutive_production_P1_ko*P1_RNAP;  // modifiers: P1_RNAP
    R_constitutive_production_P1_ko = 0.05 u_1_second_n1;
  R_constitutive_production_P0: => 10 LacI; R_constitutive_production_P0_ko*P0_RNAP;  // modifiers: P0_RNAP
    R_constitutive_production_P0_ko = 0.05 u_1_second_n1;
  R_constitutive_production_P2: => 10 CI + 10 GFP; R_constitutive_production_P2_ko*P2_RNAP;  // modifiers: P2_RNAP
    R_constitutive_production_P2_ko = 0.05 u_1_second_n1;
  R_P1_RNAP: RNAP + P1 -> P1_RNAP; R_P1_RNAP_ko_f*RNAP*P1 - R_P1_RNAP_ko_r*P1_RNAP;
    R_P1_RNAP_ko_f = 0.033 u_1_mole_n1_1_second_n1; R_P1_RNAP_ko_r = 1 u_1_second_n1;
  R_repression_binding_P1_LacI: P1 + 2 LacI -> P1_LacI_bound; R_repression_binding_P1_LacI_kr_f*R_repression_binding_P1_LacI_Kr^(R_repression_binding_P1_LacI_nc - 1)*LacI^R_repression_binding_P1_LacI_nc*P1 - R_repression_binding_P1_LacI_kr_r*P1_LacI_bound;
    R_repression_binding_P1_LacI_kr_f = 0.5 u_1_mole_n1_1_second_n1; R_repression_binding_P1_LacI_kr_r = 1 u_1_second_n1; R_repression_binding_P1_LacI_Kr = 0.5 u_1_mole_n1; R_repression_binding_P1_LacI_nc = 2 dimensionless;
  R_P0_RNAP: RNAP + P0 -> P0_RNAP; R_P0_RNAP_ko_f*RNAP*P0 - R_P0_RNAP_ko_r*P0_RNAP;
    R_P0_RNAP_ko_f = 0.033 u_1_mole_n1_1_second_n1; R_P0_RNAP_ko_r = 1 u_1_second_n1;
  R_repression_binding_P0_CI: P0 + 2 CI -> P0_CI_bound; R_repression_binding_P0_CI_kr_f*R_repression_binding_P0_CI_Kr^(R_repression_binding_P0_CI_nc - 1)*CI^R_repression_binding_P0_CI_nc*P0 - R_repression_binding_P0_CI_kr_r*P0_CI_bound;
    R_repression_binding_P0_CI_kr_f = 0.5 u_1_mole_n1_1_second_n1; R_repression_binding_P0_CI_kr_r = 1 u_1_second_n1; R_repression_binding_P0_CI_Kr = 0.5 u_1_mole_n1; R_repression_binding_P0_CI_nc = 2 dimensionless;
  R_P2_RNAP: RNAP + P2 -> P2_RNAP; R_P2_RNAP_ko_f*RNAP*P2 - R_P2_RNAP_ko_r*P2_RNAP;
    R_P2_RNAP_ko_f = 0.033 u_1_mole_n1_1_second_n1; R_P2_RNAP_ko_r = 1 u_1_second_n1;
  R_repression_binding_P2_TetR: P2 + 2 TetR -> P2_TetR_bound; R_repression_binding_P2_TetR_kr_f*R_repression_binding_P2_TetR_Kr^(R_repression_binding_P2_TetR_nc - 1)*TetR^R_repression_binding_P2_TetR_nc*P2 - R_repression_binding_P2_TetR_kr_r*P2_TetR_bound;
    R_repression_binding_P2_TetR_kr_f = 0.5 u_1_mole_n1_1_second_n1; R_repression_binding_P2_TetR_kr_r = 1 u_1_second_n1; R_repression_binding_P2_TetR_Kr = 0.5 u_1_mole_n1; R_repression_binding_P2_TetR_nc = 2 dimensionless;
  Degradation_LacI: LacI => ; Degradation_LacI_kd*LacI;
    Degradation_LacI_kd = 0.0075 u_1_second_n1;

  // Unit definitions:
  unit u_1_second_n1 = 1 / second;
  unit u_1_mole_n1_1_second_n1 = 1 / (mole * second);
  unit u_1_mole_n1 = 1 / mole;
end
