// SBML level 3 version 1

model repressilator()

  // Compartments:
  compartment Cell = 1;

  // Species:
  substanceOnly species CI in Cell = 0;
  substanceOnly species LacI in Cell = 0;
  substanceOnly species TetR in Cell = 0;
  substanceOnly species P0 in Cell = 2;
  substanceOnly species P1 in Cell = 2;
  substanceOnly species P2 in Cell = 2;
  substanceOnly species GFP in Cell = 0;

  // Parameters:
  kd = 0.0075; kd is "Degradation rate";
  kr_f = 0.5; kr_f is "Forward repression binding rate";
  kr_r = 1; kr_r is "Reverse repression binding rate";
  ka_f = 0.0033; ka_f is "Forward activation binding rate";
  ka_r = 1; ka_r is "Reverse activation binding rate";
  ko_f = 0.033; ko_f is "Forward RNAP binding rate";
  ko_r = 1; ko_r is "Reverse RNAP binding rate";
  kao_f = 1; kao_f is "Forward activated RNAP binding rate";
  kao_r = 1; kao_r is "Reverse activated RNAP binding rate";
  nc = 2; nc is "Stoichiometry of binding";
  nr = 30; nr is "Initial RNAP count";
  ko = 0.05; ko is "Open complex production rate";
  kb = 0.0001; kb is "Basal production rate";
  ng = 2; ng is "Initial promoter count";
  np = 10; np is "Stoichiometry of production";
  ka = 0.25; ka is "Activated production rate";

  // Reactions:
  Degradation_TetR: TetR => ; kd*TetR;
  Degradation_LacI: LacI => ; kd*LacI;
  Degradation_CI: CI => ; kd*CI;
  Production_P0: => 10 LacI; P0*nr/(1 + (kr_f/kr_r*CI)^nc);  // modifiers: P0, CI
  Production_P1: => 10 TetR; P1*nr/(1 + (kr_f/kr_r*LacI)^nc);  // modifiers: P1, LacI
  Production_P2: => 10 CI + GFP; P2*nr/(1 + (kr_f/kr_r*TetR)^nc);  // modifiers: P2, TetR
  Degradation_GFP: GFP => ; kd*GFP;
end
