// SBML level 3 version 1
import "file:represCirc.xml";

model testHier(C5)

  // Sub-modules:
  C1: represCirc(); delete C1.reaction__Degradation_GFP;
  C2: represCirc(); delete C2.reaction__Degradation_GFP;
  C3: represCirc(); delete C3.reaction__Degradation_GFP;
  C4: represCirc(); delete C4.reaction__Degradation_GFP;
  C5: represCirc(); delete C5.reaction__Degradation_GFP;
  C6: represCirc(); delete C6.reaction__Degradation_GFP;
  C7: represCirc(); delete C7.reaction__Degradation_GFP;
  C8: represCirc(); delete C8.reaction__Degradation_GFP;
  C9: represCirc(); delete C9.reaction__Degradation_GFP;
  C10: represCirc(); delete C10.reaction__Degradation_GFP;
  C11: represCirc(); delete C11.reaction__Degradation_GFP;
  C12: represCirc(); delete C12.reaction__Degradation_GFP;
  C13: represCirc(); delete C13.reaction__Degradation_GFP;
  C14: represCirc(); delete C14.reaction__Degradation_GFP;
  C15: represCirc(); delete C15.reaction__Degradation_GFP;
  C16: represCirc(); delete C16.reaction__Degradation_GFP;
  C17: represCirc(); delete C17.reaction__Degradation_GFP;
  C18: represCirc(); delete C18.reaction__Degradation_GFP;
  C19: represCirc(); delete C19.reaction__Degradation_GFP;
  C20: represCirc(); delete C20.reaction__Degradation_GFP;
  C21: represCirc(); delete C21.reaction__Degradation_GFP;
  C22: represCirc(); delete C22.reaction__Degradation_GFP;
  C23: represCirc(); delete C23.reaction__Degradation_GFP;
  C24: represCirc(); delete C24.reaction__Degradation_GFP;
  C25: represCirc(); delete C25.reaction__Degradation_GFP;

  // Compartments:
  compartment Cell = 1;

  // Species:
  substanceOnly species GFP_Total in Cell = 0; C1.input__GFP is GFP_Total; C2.input__GFP is GFP_Total; C3.input__GFP is GFP_Total; C4.input__GFP is GFP_Total; C6.input__GFP is GFP_Total; C7.input__GFP is GFP_Total; C8.input__GFP is GFP_Total; C9.input__GFP is GFP_Total; C10.input__GFP is GFP_Total; C11.input__GFP is GFP_Total; C12.input__GFP is GFP_Total; C13.input__GFP is GFP_Total; C14.input__GFP is GFP_Total; C15.input__GFP is GFP_Total; C16.input__GFP is GFP_Total; C17.input__GFP is GFP_Total; C18.input__GFP is GFP_Total; C19.input__GFP is GFP_Total; C20.input__GFP is GFP_Total; C21.input__GFP is GFP_Total; C22.input__GFP is GFP_Total; C23.input__GFP is GFP_Total; C24.input__GFP is GFP_Total; C25.input__GFP is GFP_Total;

  // Reactions:
  GFP_Degradation: GFP_Total => ; kd*GFP_Total;
    kd = 0.0075;
end
