// SBML level 3 version 1
import "file:represCirc.xml";

model testHier(C5)

  // Sub-modules:
  C1: represCirc(); delete C1.reaction__Degradation_GFP;
  C2: represCirc(); delete C2.reaction__Degradation_GFP;
  C3: represCirc(); delete C3.reaction__Degradation_GFP;
  C4: represCirc(); delete C4.reaction__Degradation_GFP;

  // Compartments:
  compartment Cell = 1;

  // Species:
  substanceOnly species GFP_Total in Cell = 0; C1.input__GFP is GFP_Total; C2.input__GFP is GFP_Total; C3.input__GFP is GFP_Total; C4.input__GFP is GFP_Total;

  // Reactions:
  GFP_Degradation: GFP_Total => ; kd*GFP_Total;
    kd = 0.0075;
end
