// SBML level 3 version 1
import "file:represCirc.xml";

model testHier36(C2, C2, C3, C3, C4, C4, C5, C6, C6, C7, C7, C8, C8, C9, C9, C10, C10, C11, C11, C12, C12, C13, C13, C14, C14, C15, C15, C16, C16, C17, C17, C18, C18, C19, C19, C20, C20, C21, C21, C22, C22, C23, C23, C24, C24, C25, C25, C26, C26, C27, C27, C28, C28, C29, C29, C30, C30, C31, C31, C32, C32, C33, C33, C34, C34, C35, C35, C36, C36, C42, C42, C5, C1, C37, C37, C38, C39, C40, C41, C43, C44, C45, C46, C47, C48, C49)

  // Sub-modules:
  C2: represCirc(); delete C2.reaction__Degradation_GFP;
  C3: represCirc(); delete C3.reaction__Degradation_GFP;
  C4: represCirc(); delete C4.reaction__Degradation_GFP;
  C5: represCirc(); delete C5.reaction__Degradation_GFP;
  C6: represCirc(); delete C6.reaction__Degradation_GFP;
  C7: represCirc(); delete C7.reaction__Degradation_GFP;
  C8: represCirc(); delete C8.reaction__Degradation_GFP;
  C9: represCirc(); delete C9.reaction__Degradation_GFP;
  C10: represCirc(); delete C10.reaction__Degradation_GFP;
  C11: represCirc(); delete C11.reaction__Degradation_GFP;
  C12: represCirc(); delete C12.reaction__Degradation_GFP;
  C13: represCirc(); delete C13.reaction__Degradation_GFP;
  C14: represCirc(); delete C14.reaction__Degradation_GFP;
  C15: represCirc(); delete C15.reaction__Degradation_GFP;
  C16: represCirc(); delete C16.reaction__Degradation_GFP;
  C17: represCirc(); delete C17.reaction__Degradation_GFP;
  C18: represCirc(); delete C18.reaction__Degradation_GFP;
  C19: represCirc(); delete C19.reaction__Degradation_GFP;
  C20: represCirc(); delete C20.reaction__Degradation_GFP;
  C21: represCirc(); delete C21.reaction__Degradation_GFP;
  C22: represCirc(); delete C22.reaction__Degradation_GFP;
  C23: represCirc(); delete C23.reaction__Degradation_GFP;
  C24: represCirc(); delete C24.reaction__Degradation_GFP;
  C25: represCirc(); delete C25.reaction__Degradation_GFP;
  C26: represCirc(); delete C26.reaction__Degradation_GFP;
  C27: represCirc(); delete C27.reaction__Degradation_GFP;
  C28: represCirc(); delete C28.reaction__Degradation_GFP;
  C29: represCirc(); delete C29.reaction__Degradation_GFP;
  C30: represCirc(); delete C30.reaction__Degradation_GFP;
  C31: represCirc(); delete C31.reaction__Degradation_GFP;
  C32: represCirc(); delete C32.reaction__Degradation_GFP;
  C33: represCirc(); delete C33.reaction__Degradation_GFP;
  C34: represCirc(); delete C34.reaction__Degradation_GFP;
  C35: represCirc(); delete C35.reaction__Degradation_GFP;
  C36: represCirc(); delete C36.reaction__Degradation_GFP;
  C42: represCirc(); delete C42.reaction__Degradation_GFP;
  C1: represCirc();
  C37: represCirc();
  C38: represCirc();
  C39: represCirc();
  C40: represCirc();
  C41: represCirc();
  C43: represCirc();
  C44: represCirc();
  C45: represCirc();
  C46: represCirc();
  C47: represCirc();
  C48: represCirc();
  C49: represCirc();

  // Compartments:
  compartment Cell = 1;

  // Species:
  substanceOnly species GFP_Total in Cell = 0; C2.input__GFP is GFP_Total; C3.input__GFP is GFP_Total; C4.input__GFP is GFP_Total; C6.input__GFP is GFP_Total; C7.input__GFP is GFP_Total; C8.input__GFP is GFP_Total; C9.input__GFP is GFP_Total; C10.input__GFP is GFP_Total; C11.input__GFP is GFP_Total; C12.input__GFP is GFP_Total; C13.input__GFP is GFP_Total; C14.input__GFP is GFP_Total; C15.input__GFP is GFP_Total; C16.input__GFP is GFP_Total; C17.input__GFP is GFP_Total; C18.input__GFP is GFP_Total; C19.input__GFP is GFP_Total; C20.input__GFP is GFP_Total; C21.input__GFP is GFP_Total; C22.input__GFP is GFP_Total; C23.input__GFP is GFP_Total; C24.input__GFP is GFP_Total; C25.input__GFP is GFP_Total; C26.input__GFP is GFP_Total; C27.input__GFP is GFP_Total; C28.input__GFP is GFP_Total; C29.input__GFP is GFP_Total; C30.input__GFP is GFP_Total; C31.input__GFP is GFP_Total; C32.input__GFP is GFP_Total; C33.input__GFP is GFP_Total; C34.input__GFP is GFP_Total; C35.input__GFP is GFP_Total; C36.input__GFP is GFP_Total; C42.input__GFP is GFP_Total; C49.input__GFP is GFP_Total; C39.input__GFP is GFP_Total; C40.input__GFP is GFP_Total; C47.input__GFP is GFP_Total; C45.input__GFP is GFP_Total; C44.input__GFP is GFP_Total; C38.input__GFP is GFP_Total; C43.input__GFP is GFP_Total; C46.input__GFP is GFP_Total; C48.input__GFP is GFP_Total; C1.input__GFP is GFP_Total; C41.input__GFP is GFP_Total;

  // Reactions:
  GFP_Degradation: GFP_Total => ; kd*GFP_Total;
    kd = 0.0075;
end
