// SBML level 3 version 1

model Koenig_demo_v02()
  // model units - substance: substance, time: time_unit, volume: volume, area: area, length: length, extent: extent

  // Compartments:
  compartment extern = 1e-6 m3; extern is "External Compartment";
  compartment cell = 1e-6 m3; cell is "Cell Compartment";
  compartment membrane = 1 m2; membrane is "Cell Membrane";

  // Species:
  species A in cell = 0; A is "A cell";  // substance in mole
  species B in cell = 0; B is "B cell";  // substance in mole
  species C in cell = 0; C is "C cell";  // substance in mole
  species A_ext in extern = 10; A_ext is "A extern";  // substance in mole
  species B_ext in extern = 0; B_ext is "B extern";  // substance in mole
  species C_ext in extern = 0; C_ext is "C extern";  // substance in mole

  // Parameters:
  scale_f = 1e-6 dimensionless;
  Vmax_bA = 5 mole_per_s;
  Km_A = 1 mM;
  Vmax_bB = 2 mole_per_s;
  Km_B = 0.5 mM;
  Vmax_bC = 2 mole_per_s;
  Km_C = 3 mM;
  Vmax_v1 = 1 mole_per_s;
  Keq_v1 = 10 dimensionless;
  Vmax_v2 = 0.5 mole_per_s;
  Vmax_v3 = 0.5 mole_per_s;
  Vmax_v4 = 0.5 mole_per_s;
  Keq_v4 = 2 dimensionless;

  // Reactions:
  bA: A_ext => A; scale_f*(Vmax_bA/Km_A)*(A_ext - A)/(1 + A_ext/Km_A + A/Km_A); bA is "A import";
  bB: B => B_ext; scale_f*(Vmax_bB/Km_B)*(B - B_ext)/(1 + B_ext/Km_B + B/Km_B); bB is "B export";
  bC: C => C_ext; scale_f*(Vmax_bC/Km_C)*(C - C_ext)/(1 + C_ext/Km_C + C/Km_C); bC is "C export";
  A_B: A -> B; scale_f*Vmax_v1/Km_A*(A - 1/Keq_v1*B); A_B is "A -> B";
  A_C: A -> C; scale_f*Vmax_v2/Km_A*A; A_C is "A -> C";
  C_A: C -> A; scale_f*Vmax_v3/Km_A*C; C_A is "C -> A";
  C_B: C -> B; scale_f*Vmax_v4/Km_A*(C - 1/Keq_v4*B); C_B is "C -> B";

  // Unit definitions:
  unit mM = mole / metre^3;
  unit m3 = metre^3;
  unit m2 = metre^2;
  unit mole_per_s = mole / second;
  unit substance = mole;
  unit volume = metre^3;
  unit area = metre^2;
  unit length = metre;
  unit extent = mole;
  unit time_unit = second;
end
